# OpenSim document version 40000
Model 3D_gait:
  gravity: 0 -9.81 0
  length_units: meters
  force_units: N
  Ground
  BodySet:
    Body pelvis: mass=3.940809 [kg] mass_center=(-0.02485015 0 0) inertia=(0.004249747 0.00360071 0.002393583 0 0 0)
        meshes=(C:\Users\ONeill_lab\gait_tracking\models\human_fullbody\Geometry\r_pelvis.obj C:\Users\ONeill_lab\gait_tracking\models\human_fullbody\Geometry\l_pelvis.obj C:\Users\ONeill_lab\gait_tracking\models\human_fullbody\Geometry\sacrum.obj)
      WrapCylinder Gmax1_at_pelvis_r: xyz_body_rotation=(-0.6 0.45 0) translation=(-0.02706452 -0.03479724 0.02144073)
          quadrant=-x radius=0.01405949 length=0.0527231
      WrapCylinder Gmax2_at_pelvis_r: xyz_body_rotation=(-0.75 0.39 0) translation=(-0.02811899 -0.02917345 0.02390114)
          quadrant=all radius=0.01405949 length=0.03514873
      WrapCylinder Gmax3_at_pelvis_r: xyz_body_rotation=(-0.1 0 0) translation=(-0.02917345 -0.03093088 0.02390114)
          quadrant=all radius=0.01405949 length=0.03514873
      WrapCylinder Gmax1_at_pelvis_l: xyz_body_rotation=(0.6 -0.45 0) translation=(-0.02706452 -0.03479724 -0.02144073)
          quadrant=-x radius=0.01405949 length=0.0527231
      WrapCylinder Gmax2_at_pelvis_l: xyz_body_rotation=(0.75 -0.39 0)
          translation=(-0.02811899 -0.02917345 -0.02390114) quadrant=all radius=0.01405949 length=0.03514873
      WrapCylinder Gmax3_at_pelvis_l: xyz_body_rotation=(0.1 0 0) translation=(-0.02917345 -0.03093088 -0.02390114)
          quadrant=all radius=0.01405949 length=0.03514873
      WrapCylinder PS_at_brim_r: xyz_body_rotation=(-0.25 -0.27 0.1) translation=(-0.02601006 -0.02108924 0.02305757)
          quadrant=-y radius=0.01757437 length=0.03514873
      WrapCylinder PS_at_brim_l: xyz_body_rotation=(0.25 0.27 0.1) translation=(-0.02601006 -0.02108924 -0.02305757)
          quadrant=-y radius=0.01757437 length=0.03514873
      WrapCylinder IL_at_brim_r: xyz_body_rotation=(-0.32 -0.24 0.9) translation=(-0.0249556 -0.02284668 0.02657244)
          quadrant=-y radius=0.01929665 length=0.03514873
      WrapCylinder IL_at_brim_l: xyz_body_rotation=(0.32 0.24 0.9) translation=(-0.0249556 -0.02284668 -0.02657244)
          quadrant=-y radius=0.01929665 length=0.03514873
    Body femur_l: mass=3.112426 mass_center=(0 -0.05975284 0) inertia=(0.00553542 0.001451032 0.005837202 0 0 0)
        meshes=C:\Users\ONeill_lab\gait_tracking\models\human_fullbody\Geometry\l_femur.obj
      WrapCylinder GasLat_at_condyles_l: translation=(0.001757437 -0.1441098 0) quadrant=all radius=0.00913867
          length=0.03514873
      WrapCylinder GasMed_at_condyles_l: translation=(0.001757437 -0.1441098 0) quadrant=all radius=0.008787183
          length=0.03514873
      WrapCylinder Popli_at_condyles_l: translation=(0.001757437 -0.1476247 0) quadrant=all radius=0.01054462
          length=0.03514873
      WrapCylinder KnExt_at_fem_l: xyz_body_rotation=(0.0623366 -0.0507601 0)
          translation=(0.001261235 -0.1415552 -0.0007349986) quadrant=all radius=0.008787183 length=0.03514873
      WrapCylinder KnExtVL_at_fem_l: xyz_body_rotation=(0.0623366 -0.0507601 0)
          translation=(0.0006637065 -0.1415552 -0.0007349986) quadrant=all radius=0.008787183 length=0.03514873
      WrapCylinder AB_at_femshaft_l: xyz_body_rotation=(-1.66157 -0.186644 0)
          translation=(0.005146969 -0.03957571 -0.008212501) quadrant=all radius=0.005799541 length=0.02460411
      WrapCylinder AL_at_femshaft_l: xyz_body_rotation=(-1.77711 -0.136489 0)
          translation=(0.01080215 -0.08151307 -0.005312274) quadrant=all radius=0.007064895 length=0.03514873
      WrapCylinder AMmid_at_femshaft_l: xyz_body_rotation=(-1.61139 -0.13656 0)
          translation=(0.008088602 -0.05648788 -0.007235085) quadrant=all radius=0.007521829 length=0.04217848
    Body femur_r: mass=3.112426 mass_center=(0 -0.05975284 0) inertia=(0.00553542 0.001451032 0.005837202 0 0 0)
        meshes=C:\Users\ONeill_lab\gait_tracking\models\human_fullbody\Geometry\r_femur.obj
      WrapCylinder GasLat_at_condyles_r: translation=(0.001757437 -0.1441098 0) quadrant=all radius=0.00913867
          length=0.03514873
      WrapCylinder GasMed_at_condyles_r: translation=(0.001757437 -0.1441098 0) quadrant=all radius=0.008787183
          length=0.03514873
      WrapCylinder Popli_at_condyles_r: translation=(0.001757437 -0.1476247 0) quadrant=all radius=0.01054462
          length=0.03514873
      WrapCylinder KnExt_at_fem_r: xyz_body_rotation=(-0.0623366 0.0507601 0)
          translation=(0.001261235 -0.1415552 0.0007349986) quadrant=all radius=0.008787183 length=0.03514873
      WrapCylinder KnExtVL_at_fem_r: xyz_body_rotation=(-0.0623366 0.0507601 0)
          translation=(0.0006637065 -0.1415552 0.0007349986) quadrant=all radius=0.008787183 length=0.03514873
      WrapCylinder AB_at_femshaft_r: xyz_body_rotation=(1.66157 0.186644 0)
          translation=(0.005146969 -0.03957571 0.008212501) quadrant=all radius=0.005799541 length=0.02460411
      WrapCylinder AL_at_femshaft_r: xyz_body_rotation=(1.77711 0.136489 0)
          translation=(0.01080215 -0.08151307 0.005312274) quadrant=all radius=0.007064895 length=0.03514873
      WrapCylinder AMmid_at_femshaft_r: xyz_body_rotation=(1.61139 0.13656 0)
          translation=(0.008088602 -0.05648788 0.007235085) quadrant=all radius=0.007521829 length=0.04217848
    Body tibia_l: mass=1.2406 mass_center=(0 -0.06562268 0) inertia=(0.002083534 0.0002108338 0.002112472 0 0 0)
        meshes=(C:\Users\ONeill_lab\gait_tracking\models\human_fullbody\Geometry\l_tibia.obj C:\Users\ONeill_lab\gait_tracking\models\human_fullbody\Geometry\l_fibula.obj)
      WrapCylinder GasLat_at_shank_l: xyz_body_rotation=(-2.96723 0.279725 -1.47812)
          translation=(-0.002601006 -0.02601006 0.001159908) quadrant=-y radius=0.0193318 length=0.03514873
      WrapCylinder GasMed_at_shank_l: xyz_body_rotation=(-2.96723 -0.0279725 -1.47812)
          translation=(-0.002601006 -0.02601006 0.001159908) quadrant=-y radius=0.02073775 length=0.03514873
      WrapCylinder GR_at_condyles_l: xyz_body_rotation=(0 0.4 0) translation=(-0.001054462 -0.007029746 0) quadrant=all
          radius=0.01265354 length=0.03514873
      WrapCylinder SM_at_condyles_l: xyz_body_rotation=(0 0.1 0) translation=(-0.0003514873 -0.007029746 0)
          quadrant=all radius=0.01212631 length=0.03514873
      WrapCylinder ST_at_condyles_l: xyz_body_rotation=(0 0.2 0) translation=(-0.0007029746 -0.00720549 0) quadrant=all
          radius=0.01493821 length=0.03514873
      WrapCylinder BF140_at_gastroc_l: translation=(-0.01370801 -0.02108924 0) quadrant=all radius=0.01019313
          length=0.0527231
    Body tibia_r: mass=1.2406 mass_center=(0 -0.06562268 0) inertia=(0.002083534 0.0002108338 0.002112472 0 0 0)
        meshes=(C:\Users\ONeill_lab\gait_tracking\models\human_fullbody\Geometry\r_tibia.obj C:\Users\ONeill_lab\gait_tracking\models\human_fullbody\Geometry\r_fibula.obj)
      WrapCylinder GasLat_at_shank_r: xyz_body_rotation=(2.96723 -0.279725 -1.47812)
          translation=(-0.002601006 -0.02601006 -0.001159908) quadrant=-y radius=0.0193318 length=0.03514873
      WrapCylinder GasMed_at_shank_r: xyz_body_rotation=(2.96723 0.0279725 -1.47812)
          translation=(-0.002601006 -0.02601006 -0.001159908) quadrant=-y radius=0.02073775 length=0.03514873
      WrapCylinder GR_at_condyles_r: xyz_body_rotation=(0 -0.4 0) translation=(-0.001054462 -0.007029746 0)
          quadrant=all radius=0.01265354 length=0.03514873
      WrapCylinder SM_at_condyles_r: xyz_body_rotation=(0 -0.1 0) translation=(-0.0003514873 -0.007029746 0)
          quadrant=all radius=0.01212631 length=0.03514873
      WrapCylinder ST_at_condyles_r: xyz_body_rotation=(0 -0.2 0) translation=(-0.0007029746 -0.00720549 0)
          quadrant=all radius=0.01493821 length=0.03514873
      WrapCylinder BF140_at_gastroc_r: translation=(-0.01370801 -0.02108924 0) quadrant=y radius=0.01019313
          length=0.0527231
    Body patella_l: mass=0.664246 mass_center=(0.0018 0.0264 0) inertia=(2.211585e-5 0.000101024 0.000101024 0 0 0)
        meshes=C:\Users\ONeill_lab\gait_tracking\models\human_fullbody\Geometry\l_patella.obj
    Body patella_r: mass=0.664246 mass_center=(0.0018 0.0264 0) inertia=(2.211585e-5 0.000101024 0.000101024 0 0 0)
        meshes=C:\Users\ONeill_lab\gait_tracking\models\human_fullbody\Geometry\r_patella.obj
    Body talus_l: mass=0.03346191 mass_center=(0 0 0) inertia=(4.133995e-5 4.133995e-5 4.133995e-5 0 0 0)
        meshes=C:\Users\ONeill_lab\gait_tracking\models\human_fullbody\Geometry\l_talus.obj
    Body talus_r: mass=0.03346191 mass_center=(0 0 0) inertia=(4.133995e-5 4.133995e-5 4.133995e-5 0 0 0)
        meshes=C:\Users\ONeill_lab\gait_tracking\models\human_fullbody\Geometry\r_talus.obj
    Body calcn_l: mass=0.4182738 mass_center=(0.03514873 0.01054462 0)
        inertia=(5.787594e-5 0.0001612258 0.0001694938 0 0 0)
        meshes=C:\Users\ONeill_lab\gait_tracking\models\human_fullbody\Geometry\l_foot.obj
    Body calcn_r: mass=0.4182738 mass_center=(0.03514873 0.01054462 0)
        inertia=(5.787594e-5 0.0001612258 0.0001694938 0 0 0)
        meshes=C:\Users\ONeill_lab\gait_tracking\models\human_fullbody\Geometry\r_foot.obj
    Body toes_l: mass=0.07247849 mass_center=(0.01216146 0.002108924 0.006151028)
        inertia=(4.133995e-6 8.267991e-6 4.133995e-5 0 0 0)
        meshes=C:\Users\ONeill_lab\gait_tracking\models\human_fullbody\Geometry\l_bofoot.obj
    Body toes_r: mass=0.07247849 mass_center=(0.01216146 0.002108924 0.006151028)
        inertia=(4.133995e-6 8.267991e-6 4.133995e-5 0 0 0)
        meshes=C:\Users\ONeill_lab\gait_tracking\models\human_fullbody\Geometry\r_bofoot.obj
    Body torso: mass=8.976692 mass_center=(0.007029746 0.1124759 0) inertia=(0.06095576 0.03123234 0.05917401 0 0 0)
        meshes=(C:\Users\ONeill_lab\gait_tracking\models\human_fullbody\Geometry\hat_spine.obj C:\Users\ONeill_lab\gait_tracking\models\human_fullbody\Geometry\hat_jaw.obj C:\Users\ONeill_lab\gait_tracking\models\human_fullbody\Geometry\hat_skull.obj C:\Users\ONeill_lab\gait_tracking\models\human_fullbody\Geometry\hat_ribs_scap.obj)
    Body humerus_r: mass=0.6801132 mass_center=(0 -0.05782037 0) inertia=(0.0004938471 0.000170362 0.0005543275 0 0 0)
        meshes=C:\Users\ONeill_lab\gait_tracking\models\human_fullbody\Geometry\humerus_rv.obj
    Body ulna_r: mass=0.2032811 mass_center=(0 -0.04236301 0) inertia=(0.0001224489 2.554809e-5 0.0001328253 0 0 0)
        meshes=C:\Users\ONeill_lab\gait_tracking\models\human_fullbody\Geometry\ulna_rv.obj
    Body radius_r: mass=0.2032811 mass_center=(0 -0.04236301 0) inertia=(0.0001224489 2.554809e-5 0.0001328253 0 0 0)
        meshes=C:\Users\ONeill_lab\gait_tracking\models\human_fullbody\Geometry\radius_rv.obj
    Body hand_r: mass=0.1530882 mass_center=(0 -0.02393453 0) inertia=(3.687524e-5 2.261296e-5 5.539554e-5 0 0 0)
        meshes=(C:\Users\ONeill_lab\gait_tracking\models\human_fullbody\Geometry\pisiform_rvs.obj C:\Users\ONeill_lab\gait_tracking\models\human_fullbody\Geometry\lunate_rvs.obj C:\Users\ONeill_lab\gait_tracking\models\human_fullbody\Geometry\scaphoid_rvs.obj C:\Users\ONeill_lab\gait_tracking\models\human_fullbody\Geometry\triquetrum_rvs.obj C:\Users\ONeill_lab\gait_tracking\models\human_fullbody\Geometry\hamate_rvs.obj C:\Users\ONeill_lab\gait_tracking\models\human_fullbody\Geometry\capitate_rvs.obj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)
    Body humerus_l: mass=0.6801132 mass_center=(0 -0.05782037 0) inertia=(0.0004938471 0.000170362 0.0005543275 0 0 0)
        meshes=C:\Users\ONeill_lab\gait_tracking\models\human_fullbody\Geometry\humerus_lv.obj
    Body ulna_l: mass=0.2032811 mass_center=(0 -0.04236301 0) inertia=(0.0001224489 2.554809e-5 0.0001328253 0 0 0)
        meshes=C:\Users\ONeill_lab\gait_tracking\models\human_fullbody\Geometry\ulna_lv.obj
    Body radius_l: mass=0.2032811 mass_center=(0 -0.04236301 0) inertia=(0.0001224489 2.554809e-5 0.0001328253 0 0 0)
        meshes=C:\Users\ONeill_lab\gait_tracking\models\human_fullbody\Geometry\radius_lv.obj
    Body hand_l: mass=0.1530882 mass_center=(0 -0.02393453 0) inertia=(3.687524e-5 2.261296e-5 5.539554e-5 0 0 0)
        meshes=(C:\Users\ONeill_lab\gait_tracking\models\human_fullbody\Geometry\pisiform_lvs.obj C:\Users\ONeill_lab\gait_tracking\models\human_fullbody\Geometry\lunate_lvs.obj C:\Users\ONeill_lab\gait_tracking\models\human_fullbody\Geometry\scaphoid_lvs.obj C:\Users\ONeill_lab\gait_tracking\models\human_fullbody\Geometry\triquetrum_lvs.obj C:\Users\ONeill_lab\gait_tracking\models\human_fullbody\Geometry\hamate_lvs.obj C:\Users\ONeill_lab\gait_tracking\models\human_fullbody\Geometry\capitate_lvs.obj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)
    ObjectGroup R_hip_abd: members=glut_med2_r
    ObjectGroup R_hip_flex: members=(grac_r iliacus_r)
    ObjectGroup R_hip_inrot: members=iliacus_r
    ObjectGroup R_hip_exrot
    ObjectGroup R_hip_ext: members=(bifemlh_r glut_max2_r)
    ObjectGroup R_hip_add: members=(bifemlh_r grac_r)
    ObjectGroup R_knee_bend: members=(bifemlh_r bifemsh_r grac_r med_gas_r)
    ObjectGroup R_knee_ext: members=vas_int_r
    ObjectGroup R_ankle_pf: members=(med_gas_r soleus_r)
    ObjectGroup R_inverter: members=tib_ant_r
    ObjectGroup R_ankle_df: members=tib_ant_r
    ObjectGroup L_hip_abd: members=glut_med2_l
    ObjectGroup L_hip_flex: members=(grac_l iliacus_l)
    ObjectGroup L_hip_inrot: members=iliacus_l
    ObjectGroup L_hip_exrot
    ObjectGroup L_hip_ext: members=(bifemlh_l glut_max2_l)
    ObjectGroup L_hip_add: members=(bifemlh_l grac_l)
    ObjectGroup L_knee_bend: members=(bifemlh_l bifemsh_l grac_l med_gas_l)
    ObjectGroup L_knee_ext: members=vas_int_l
    ObjectGroup L_ankle_pf: members=(med_gas_l soleus_l)
    ObjectGroup L_inverter: members=tib_ant_l
    ObjectGroup L_ankle_df: members=tib_ant_l
    ObjectGroup back_ext: members=(ercspn_l ercspn_r)
    ObjectGroup back_rlb: members=(ercspn_r extobl_r intobl_r)
    ObjectGroup back_introt: members=(ercspn_r extobl_l intobl_r)
    ObjectGroup back_llb: members=(ercspn_l extobl_l intobl_l)
    ObjectGroup back_extrot: members=(ercspn_l extobl_r intobl_l)
    ObjectGroup back_flex
  JointSet:
    CustomJoint ground_pelvis: socket_parent_frame=ground_offset socket_child_frame=pelvis_offset
      Coordinate pelvis_tilt: range=(-0.1745 0.1745)
      Coordinate pelvis_list: range=(-0.1745 0.1745)
      Coordinate pelvis_rotation: range=(-0.1745 0.1745)
      Coordinate pelvis_tx: range=(-5 5)
      Coordinate pelvis_ty: default_value=0.94 range=(-0.5 1.5)
      Coordinate pelvis_tz: default_value=0 range=(-3 3)
      PhysicalOffsetFrame ground_offset: socket_parent=/ground translation=(0 0 0) [meters]
      PhysicalOffsetFrame pelvis_offset: socket_parent=/bodyset/pelvis translation=(0 0 0)
      SpatialTransform:
        TransformAxis rotation1: coordinates=pelvis_tilt axis=(0 0 1) LinearFunction(coefficients=1 0)
        TransformAxis rotation2: coordinates=pelvis_list axis=(1 0 0) LinearFunction(coefficients=1 0)
        TransformAxis rotation3: coordinates=pelvis_rotation axis=(0 1 0) LinearFunction(coefficients=1 0)
        TransformAxis translation1: coordinates=pelvis_tx axis=(1 0 0) LinearFunction(coefficients=1 0)
        TransformAxis translation2: coordinates=pelvis_ty axis=(0 1 0) LinearFunction(coefficients=1 0)
        TransformAxis translation3: coordinates=pelvis_tz axis=(0 0 1) LinearFunction(coefficients=1 0)
    CustomJoint hip_l: socket_parent_frame=pelvis_offset socket_child_frame=femur_l_offset
      Coordinate hip_flexion_l: default_value=0 range=(-0.5235988 2.094395)
      Coordinate hip_adduction_l: range=(-0.8726646 0.5235988)
      Coordinate hip_rotation_l: range=(-0.6981317 0.6981317)
      PhysicalOffsetFrame pelvis_offset: socket_parent=/bodyset/pelvis translation=(-0.0197803 -0.02758824 -0.02715591)
      PhysicalOffsetFrame femur_l_offset: socket_parent=/bodyset/femur_l translation=(0 0 0)
      SpatialTransform: axes_held_at_zero=(translation1 translation2 translation3)
        TransformAxis rotation1: coordinates=hip_flexion_l axis=(0 0 1) LinearFunction(coefficients=1 0)
        TransformAxis rotation2: coordinates=hip_adduction_l axis=(1 0 0) LinearFunction(coefficients=-1 0)
        TransformAxis rotation3: coordinates=hip_rotation_l axis=(0 1 0) LinearFunction(coefficients=-1 0)
    CustomJoint hip_r: socket_parent_frame=pelvis_offset socket_child_frame=femur_r_offset
      Coordinate hip_flexion_r: default_value=0 range=(-0.5235988 2.094395)
      Coordinate hip_adduction_r: range=(-0.8726646 0.5235988)
      Coordinate hip_rotation_r: range=(-0.6981317 0.6981317)
      PhysicalOffsetFrame pelvis_offset: socket_parent=/bodyset/pelvis translation=(-0.0197803 -0.02758824 0.02715591)
      PhysicalOffsetFrame femur_r_offset: socket_parent=/bodyset/femur_r translation=(0 0 0)
      SpatialTransform: axes_held_at_zero=(translation1 translation2 translation3)
        TransformAxis rotation1: coordinates=hip_flexion_r axis=(0 0 1) LinearFunction(coefficients=1 0)
        TransformAxis rotation2: coordinates=hip_adduction_r axis=(1 0 0) LinearFunction(coefficients=1 0)
        TransformAxis rotation3: coordinates=hip_rotation_r axis=(0 1 0) LinearFunction(coefficients=1 0)
    CustomJoint patellofemoral_l: socket_parent_frame=tibia_l_offset socket_child_frame=patella_l_offset
      Coordinate knee_angle_l_beta
      PhysicalOffsetFrame tibia_l_offset: socket_parent=/bodyset/femur_l
          translation=(-0.002843532 -0.1433928 0.0009665901)
      PhysicalOffsetFrame patella_l_offset: socket_parent=/bodyset/patella_l translation=(0 0 0)
      SpatialTransform: axes_held_at_zero=(rotation2 rotation3)
        TransformAxis rotation1: coordinates=knee_angle_l_beta axis=(0 0 1)
          SimmSpline: x=(0 0.174533 0.349066 0.523599 0.698132 0.872665 1.0472 1.22173 1.39626 1.5708 1.74533 1.91986 2.0944)
              y=(0.00113686 -0.00629212 -0.105582 -0.253683 -0.414245 -0.579047 -0.747244 -0.91799 -1.09044 -1.26379 -1.43763 -1.61186 -1.78634)
        TransformAxis translation1: coordinates=knee_angle_l_beta axis=(1 0 0)
          MultiplierFunction: scale=0.3514873
            SimmSpline: x=(0 0.174533 0.349066 0.523599 0.698132 0.872665 1.0472 1.22173 1.39626 1.5708 1.74533 1.91986 2.0944)
                y=(0.0524 0.0488 0.0437 0.0371 0.0296 0.0216 0.0136 0.0057 -0.0019 -0.0088 -0.0148 -0.0196 -0.0227)
        TransformAxis translation2: coordinates=knee_angle_l_beta axis=(0 1 0)
          MultiplierFunction: scale=0.3514873
            SimmSpline: x=(0 0.174533 0.349066 0.523599 0.698132 0.872665 1.0472 1.22173 1.39626 1.5708 1.74533 1.91986 2.0944)
                y=(-0.0108 -0.019 -0.0263 -0.0322 -0.0367 -0.0395 -0.0408 -0.0404 -0.0384 -0.0349 -0.0301 -0.0245 -0.0187)
        TransformAxis translation3: axis=(0 0 1) MultiplierFunction(scale=0.3514873, Constant(value=-0.00275))
    CustomJoint patellofemoral_r: socket_parent_frame=tibia_r_offset socket_child_frame=patella_r_offset
      Coordinate knee_angle_r_beta
      PhysicalOffsetFrame tibia_r_offset: socket_parent=/bodyset/femur_r
          translation=(-0.002843532 -0.1433928 -0.0009665901)
      PhysicalOffsetFrame patella_r_offset: socket_parent=/bodyset/patella_r translation=(0 0 0)
      SpatialTransform: axes_held_at_zero=(rotation2 rotation3)
        TransformAxis rotation1: coordinates=knee_angle_r_beta axis=(0 0 1)
          SimmSpline: x=(0 0.174533 0.349066 0.523599 0.698132 0.872665 1.0472 1.22173 1.39626 1.5708 1.74533 1.91986 2.0944)
              y=(0.00113686 -0.00629212 -0.105582 -0.253683 -0.414245 -0.579047 -0.747244 -0.91799 -1.09044 -1.26379 -1.43763 -1.61186 -1.78634)
        TransformAxis translation1: coordinates=knee_angle_r_beta axis=(1 0 0)
          MultiplierFunction: scale=0.3514873
            SimmSpline: x=(0 0.174533 0.349066 0.523599 0.698132 0.872665 1.0472 1.22173 1.39626 1.5708 1.74533 1.91986 2.0944)
                y=(0.0524 0.0488 0.0437 0.0371 0.0296 0.0216 0.0136 0.0057 -0.0019 -0.0088 -0.0148 -0.0196 -0.0227)
        TransformAxis translation2: coordinates=knee_angle_r_beta axis=(0 1 0)
          MultiplierFunction: scale=0.3514873
            SimmSpline: x=(0 0.174533 0.349066 0.523599 0.698132 0.872665 1.0472 1.22173 1.39626 1.5708 1.74533 1.91986 2.0944)
                y=(-0.0108 -0.019 -0.0263 -0.0322 -0.0367 -0.0395 -0.0408 -0.0404 -0.0384 -0.0349 -0.0301 -0.0245 -0.0187)
        TransformAxis translation3: axis=(0 0 1) MultiplierFunction(scale=0.3514873, Constant(value=0.00275))
    PinJoint knee_l: socket_parent_frame=femur_l_offset socket_child_frame=tibia_l_offset
      Coordinate knee_angle_l: default_value=0 range=(-2.094395 0)
      PhysicalOffsetFrame femur_l_offset: socket_parent=/bodyset/femur_l translation=(0 -0.1433928 0.0009665901)
      PhysicalOffsetFrame tibia_l_offset: socket_parent=/bodyset/tibia_l translation=(0 0 0)
    PinJoint knee_r: socket_parent_frame=femur_r_offset socket_child_frame=tibia_r_offset
      Coordinate knee_angle_r: default_value=0 range=(-2.094395 0)
      PhysicalOffsetFrame femur_r_offset: socket_parent=/bodyset/femur_r translation=(0 -0.1433928 -0.0009665901)
      PhysicalOffsetFrame tibia_r_offset: socket_parent=/bodyset/tibia_r translation=(0 0 0)
    PinJoint ankle_l: socket_parent_frame=tibia_l_offset socket_child_frame=talus_l_offset
      Coordinate ankle_angle_l: range=(-0.6981317 0.5235988)
      PhysicalOffsetFrame tibia_l_offset: socket_parent=/bodyset/tibia_l translation=(-0.003514873 -0.1405949 0)
          orientation=(-0.1758952 0.105208 0.01866219) [radians]
      PhysicalOffsetFrame talus_l_offset: socket_parent=/bodyset/talus_l translation=(0 0 0)
          orientation=(-0.1758952 0.105208 0.01866219)
    PinJoint ankle_r: socket_parent_frame=tibia_r_offset socket_child_frame=talus_r_offset
      Coordinate ankle_angle_r: range=(-0.6981317 0.5235988)
      PhysicalOffsetFrame tibia_r_offset: socket_parent=/bodyset/tibia_r translation=(-0.003514873 -0.1405949 0)
          orientation=(0.1758952 -0.105208 0.01866219)
      PhysicalOffsetFrame talus_r_offset: socket_parent=/bodyset/talus_r translation=(0 0 0)
          orientation=(0.1758952 -0.105208 0.01866219)
    PinJoint subtalar_l: socket_parent_frame=talus_l_offset socket_child_frame=calcn_l_offset
      Coordinate subtalar_angle_l: range=(-0.3490659 0.3490659)
      PhysicalOffsetFrame talus_l_offset: socket_parent=/bodyset/talus_l
          translation=(-0.01714204 -0.01474489 -0.00278378) orientation=(1.768191 -0.906223 1.819602)
      PhysicalOffsetFrame calcn_l_offset: socket_parent=/bodyset/calcn_l translation=(0 0 0)
          orientation=(1.768191 -0.906223 1.819602)
    PinJoint subtalar_r: socket_parent_frame=talus_r_offset socket_child_frame=calcn_r_offset
      Coordinate subtalar_angle_r: range=(-0.3490659 0.3490659)
      PhysicalOffsetFrame talus_r_offset: socket_parent=/bodyset/talus_r
          translation=(-0.01714204 -0.01474489 0.00278378) orientation=(-1.768191 0.906223 1.819602)
      PhysicalOffsetFrame calcn_r_offset: socket_parent=/bodyset/calcn_r translation=(0 0 0)
          orientation=(-1.768191 0.906223 1.819602)
    PinJoint mtp_l: socket_parent_frame=calcn_l_offset socket_child_frame=toes_l_offset
      Coordinate mtp_angle_l: range=(-1.0472 1.0472)
      PhysicalOffsetFrame calcn_l_offset: socket_parent=/bodyset/calcn_l
          translation=(0.06284593 -0.0007029746 -0.0003796063) orientation=(0 0.6199005 0)
      PhysicalOffsetFrame toes_l_offset: socket_parent=/bodyset/toes_l translation=(0 0 0) orientation=(0 0.6199005 0)
    PinJoint mtp_r: socket_parent_frame=calcn_r_offset socket_child_frame=toes_r_offset
      Coordinate mtp_angle_r: range=(-1.0472 1.0472)
      PhysicalOffsetFrame calcn_r_offset: socket_parent=/bodyset/calcn_r
          translation=(0.06284593 -0.0007029746 0.0003796063) orientation=(0 -0.6199005 0)
      PhysicalOffsetFrame toes_r_offset: socket_parent=/bodyset/toes_r translation=(0 0 0) orientation=(0 -0.6199005 0)
    CustomJoint back: socket_parent_frame=pelvis_offset socket_child_frame=torso_offset
      Coordinate lumbar_flexion: range=(-0.1745 0.1745)
      Coordinate lumbar_bending: range=(-0.1745 0.1745)
      Coordinate lumbar_rotation: range=(-0.1745 0.1745)
      PhysicalOffsetFrame pelvis_offset: socket_parent=/bodyset/pelvis translation=(-0.03539477 0.02864622 0)
      PhysicalOffsetFrame torso_offset: socket_parent=/bodyset/torso translation=(0 0 0)
      SpatialTransform: axes_held_at_zero=(translation1 translation2 translation3)
        TransformAxis rotation1: coordinates=lumbar_flexion axis=(0 0 1) LinearFunction(coefficients=1 0)
        TransformAxis rotation2: coordinates=lumbar_bending axis=(1 0 0) LinearFunction(coefficients=1 0)
        TransformAxis rotation3: coordinates=lumbar_rotation axis=(0 1 0) LinearFunction(coefficients=1 0)
    CustomJoint shoulder_r: socket_parent_frame=torso_offset socket_child_frame=humerus_r_offset
      Coordinate shoulder_flexion_r: default_value=0 range=(-1.0472 3.1416)
      Coordinate shoulder_adduction_r: default_value=0 range=(-0.5236 0.1745)
      Coordinate shoulder_rotation_r: default_value=0 range=(-0.5236 0.5236)
      PhysicalOffsetFrame torso_offset: socket_parent=/bodyset/torso translation=(0.001108942 0.1305775 0.05975284)
      PhysicalOffsetFrame humerus_r_offset: socket_parent=/bodyset/humerus_r translation=(0 0 0)
      SpatialTransform: axes_held_at_zero=(translation1 translation2 translation3)
        TransformAxis rotation1: coordinates=shoulder_flexion_r axis=(0 0 1) LinearFunction(coefficients=1 0)
        TransformAxis rotation2: coordinates=shoulder_adduction_r axis=(1 0 0) LinearFunction(coefficients=1 0)
        TransformAxis rotation3: coordinates=shoulder_rotation_r axis=(0 1 0) LinearFunction(coefficients=1 0)
    PinJoint elbow_r: socket_parent_frame=humerus_r_offset socket_child_frame=ulna_r_offset
      Coordinate elbow_flexion_r: default_value=0 range=(0 2.618)
      PhysicalOffsetFrame humerus_r_offset: socket_parent=/bodyset/humerus_r
          translation=(0.004619949 -0.1006213 -0.003372521) orientation=(-0.02286271 0.2280177 0.005168901)
      PhysicalOffsetFrame ulna_r_offset: socket_parent=/bodyset/ulna_r translation=(0 0 0)
          orientation=(-0.02286271 0.2280177 0.005168901)
    WeldJoint radioulnar_r: socket_parent_frame=ulna_r_offset socket_child_frame=radius_r_offset
      PhysicalOffsetFrame ulna_r_offset: socket_parent=/bodyset/ulna_r
          translation=(-0.002364455 -0.004571796 0.009167844) orientation=(-1.568841 0.05642797 1.536144)
      PhysicalOffsetFrame radius_r_offset: socket_parent=/bodyset/radius_r translation=(0 0 0)
          orientation=(-1.568841 0.05642797 -0.0346525)
    WeldJoint wrist_r: socket_parent_frame=radius_r_offset socket_child_frame=hand_r_offset
      PhysicalOffsetFrame radius_r_offset: socket_parent=/bodyset/radius_r
          translation=(-0.003092034 -0.08289512 0.004783742)
      PhysicalOffsetFrame hand_r_offset: socket_parent=/bodyset/hand_r translation=(0 0 0)
    CustomJoint shoulder_l: socket_parent_frame=torso_offset socket_child_frame=humerus_l_offset
      Coordinate shoulder_flexion_l: default_value=0 range=(-1.0472 3.1416)
      Coordinate shoulder_adduction_l: default_value=0 range=(-0.5236 0.1745)
      Coordinate shoulder_rotation_l: default_value=0 range=(-0.5236 0.5236)
      PhysicalOffsetFrame torso_offset: socket_parent=/bodyset/torso translation=(0.001108942 0.1305775 -0.05975284)
      PhysicalOffsetFrame humerus_l_offset: socket_parent=/bodyset/humerus_l translation=(0 0 0)
      SpatialTransform: axes_held_at_zero=(translation1 translation2 translation3)
        TransformAxis rotation1: coordinates=shoulder_flexion_l axis=(0 0 1) LinearFunction(coefficients=1 0)
        TransformAxis rotation2: coordinates=shoulder_adduction_l axis=(1 0 0) LinearFunction(coefficients=-1 0)
        TransformAxis rotation3: coordinates=shoulder_rotation_l axis=(0 1 0) LinearFunction(coefficients=-1 0)
    PinJoint elbow_l: socket_parent_frame=humerus_l_offset socket_child_frame=ulna_l_offset
      Coordinate elbow_flexion_l: default_value=0 range=(0 2.618)
      PhysicalOffsetFrame humerus_l_offset: socket_parent=/bodyset/humerus_l
          translation=(0.004619949 -0.1006213 0.003372521) orientation=(0.02286271 -0.2280177 0.005168901)
      PhysicalOffsetFrame ulna_l_offset: socket_parent=/bodyset/ulna_l translation=(0 0 0)
          orientation=(0.02286271 -0.2280177 0.005168901)
    WeldJoint radioulnar_l: socket_parent_frame=ulna_l_offset socket_child_frame=radius_l_offset
      PhysicalOffsetFrame ulna_l_offset: socket_parent=/bodyset/ulna_l
          translation=(-0.002364455 -0.004571796 -0.009167844) orientation=(1.568841 -0.05642797 1.536144)
      PhysicalOffsetFrame radius_l_offset: socket_parent=/bodyset/radius_l translation=(0 0 0)
          orientation=(1.568841 -0.05642797 -0.0346525)
    WeldJoint wrist_l: socket_parent_frame=radius_l_offset socket_child_frame=hand_l_offset
      PhysicalOffsetFrame radius_l_offset: socket_parent=/bodyset/radius_l
          translation=(-0.003092034 -0.08289512 -0.004783742)
      PhysicalOffsetFrame hand_l_offset: socket_parent=/bodyset/hand_l translation=(0 0 0)
  ConstraintSet:
    CoordinateCouplerConstraint patellofemoral_knee_angle_r_con: independent_coordinate_names=knee_angle_r
        dependent_coordinate_name=knee_angle_r_beta scale_factor=1
        coupled_coordinates_function=LinearFunction(coefficients=-1 0)
    CoordinateCouplerConstraint patellofemoral_knee_angle_l_con: independent_coordinate_names=knee_angle_l
        dependent_coordinate_name=knee_angle_l_beta scale_factor=1
        coupled_coordinates_function=LinearFunction(coefficients=-1 0)
  ForceSet:
    DeGrooteFregly2016Muscle [values shared by the 84 below unless stated]: min_control=0.001 max_control=1
        max_contraction_velocity=12 default_activation=0.01 fiber_damping=0.01
        passive_fiber_strain_at_one_norm_force=0.7 tendon_strain_at_one_norm_force=0.049
    DeGrooteFregly2016Muscle addbrev_r: max_isometric_force=626 optimal_fiber_length=0.1031 tendon_slack_length=0.0355
        pennation_angle_at_optimal=0.1148 [radians] activation_time_constant=0.016 deactivation_time_constant=0.057
        active_force_width_scale=1 ignore_passive_fiber_force=false
      PathPoint P1: pelvis (-0.006713408 -0.03303981 0.005412905)
      PathPoint P2: femur_r (-0.0007029746 -0.0414755 0.008752034)
      PathWrap: wrap_object=AB_at_femshaft_r method=hybrid
    DeGrooteFregly2016Muscle addlong_r: max_isometric_force=917 optimal_fiber_length=0.1082 tendon_slack_length=0.1318
        pennation_angle_at_optimal=0.1378 activation_time_constant=0.018 deactivation_time_constant=0.062
        active_force_width_scale=1 ignore_passive_fiber_force=false
      PathPoint P1: pelvis (-0.002664274 -0.03124722 0.006636081)
      PathPoint P2: femur_r (0.003957747 -0.08413552 0.005564044)
      PathWrap: wrap_object=AL_at_femshaft_r method=hybrid
    DeGrooteFregly2016Muscle addmagMid_r: max_isometric_force=2389 optimal_fiber_length=0.1377
        tendon_slack_length=0.0466 pennation_angle_at_optimal=0.2073 activation_time_constant=0.05
        deactivation_time_constant=0.142 active_force_width_scale=1 ignore_passive_fiber_force=false
      PathPoint P1: pelvis (-0.01850932 -0.04244209 0.01003145)
      PathPoint P2: femur_r (0.0008505993 -0.05708154 0.01027046)
      PathWrap: wrap_object=AMmid_at_femshaft_r method=hybrid
    DeGrooteFregly2016Muscle bflh_r: max_isometric_force=1313 optimal_fiber_length=0.0976 tendon_slack_length=0.3325
        pennation_angle_at_optimal=0.1759182 activation_time_constant=0.027 deactivation_time_constant=0.084
        active_force_width_scale=1.5 ignore_passive_fiber_force=false
      PathPoint P1: pelvis (-0.03655468 -0.04186214 0.02059716)
      PathPoint P2: tibia_r (-0.0120771 -0.01282226 0.01271681)
      PathPoint P3: tibia_r (-0.009504217 -0.01760248 0.0122177)
    DeGrooteFregly2016Muscle bfsh_r: max_isometric_force=557 optimal_fiber_length=0.1103 tendon_slack_length=0.1058
        pennation_angle_at_optimal=0.2642 activation_time_constant=0.012 deactivation_time_constant=0.048
        active_force_width_scale=1 ignore_passive_fiber_force=false
      PathPoint P1: femur_r (0.001757437 -0.07419897 0.008224803)
      PathPoint P2: tibia_r (-0.01007363 -0.01154284 0.01126165)
      PathWrap: wrap_object=BF140_at_gastroc_r method=hybrid
    DeGrooteFregly2016Muscle edl_r: max_isometric_force=603 optimal_fiber_length=0.0693 tendon_slack_length=0.3689
        pennation_angle_at_optimal=0.2183 activation_time_constant=0.009 deactivation_time_constant=0.041
        active_force_width_scale=1.5 ignore_passive_fiber_force=false
      PathPoint P1: tibia_r (-0.005623797 -0.04066708 0.00720549)
      PathPoint P2: tibia_r (0.005764392 -0.1321592 0.003936658)
      PathPoint P3: calcn_r (0.03230168 0.01265354 0.0002811899)
      PathPoint P4: calcn_r (0.05680035 0.00193318 0.004569335)
      PathPoint P5: toes_r (0.0001054462 0.00165199 0.005377756)
      PathPoint P6: toes_r (0.01557089 -0.0001405949 0.008787183)
    DeGrooteFregly2016Muscle ehl_r: max_isometric_force=286 optimal_fiber_length=0.0748 tendon_slack_length=0.3268
        pennation_angle_at_optimal=0.1972681 activation_time_constant=0.01 deactivation_time_constant=0.043
        active_force_width_scale=1.5 ignore_passive_fiber_force=false
      PathPoint P1: tibia_r (-0.004920822 -0.05448053 0.00664311)
      PathPoint P2: tibia_r (0.00249556 -0.1022477 0.005764392)
      PathPoint P3: tibia_r (0.007029746 -0.1298043 -0.0009841645)
      PathPoint P4: calcn_r (0.03409427 0.01367286 -0.007416382)
      PathPoint P5: calcn_r (0.04544731 0.01086096 -0.009033224)
      PathPoint P6: calcn_r (0.0609479 0.004885674 -0.009841645)
      PathPoint P7: toes_r (0.01047432 0.001441098 -0.008611439)
      PathPoint P8: toes_r (0.01978874 0.001195057 -0.006537664)
    DeGrooteFregly2016Muscle fdl_r: max_isometric_force=423 optimal_fiber_length=0.0446 tendon_slack_length=0.3788
        pennation_angle_at_optimal=0.2248 activation_time_constant=0.007 deactivation_time_constant=0.035
        active_force_width_scale=1.5 ignore_passive_fiber_force=false
      PathPoint P1: tibia_r (-0.0008084208 -0.06439248 -0.0006326772)
      PathPoint P2: tibia_r (-0.006186177 -0.1281171 -0.004358443)
      PathPoint P3: calcn_r (0.01532485 0.01107185 -0.009841645)
      PathPoint P4: calcn_r (0.0248853 0.006186177 -0.009244116)
      PathPoint P5: calcn_r (0.0582766 -0.002847047 0.004077253)
      PathPoint P6: toes_r (-0.0006678259 -0.002741601 0.005166864)
      PathPoint P7: toes_r (0.01001739 -0.00249556 0.007556977)
      PathPoint P8: toes_r (0.01550059 -0.002108924 0.008505993)
    DeGrooteFregly2016Muscle fhl_r: max_isometric_force=908 optimal_fiber_length=0.0527 tendon_slack_length=0.3543
        pennation_angle_at_optimal=0.258 activation_time_constant=0.01 deactivation_time_constant=0.042
        active_force_width_scale=1.5 ignore_passive_fiber_force=false
      PathPoint P1: tibia_r (-0.01089611 -0.07602671 0.007029746)
      PathPoint P2: tibia_r (-0.008505993 -0.129031 -0.002671304)
      PathPoint P3: calcn_r (0.01314563 0.00970105 -0.008470844)
      PathPoint P4: calcn_r (0.03648438 0.002390114 -0.008998075)
      PathPoint P5: calcn_r (0.06066671 -0.001862883 -0.009455009)
      PathPoint P6: toes_r (0.005448053 -0.002249519 -0.009314414)
      PathPoint P7: toes_r (0.01975359 -0.003585171 -0.00636192)
    DeGrooteFregly2016Muscle gaslat_r: max_isometric_force=1575 optimal_fiber_length=0.069 tendon_slack_length=0.374
        pennation_angle_at_optimal=0.2102 activation_time_constant=0.016 deactivation_time_constant=0.058
        active_force_width_scale=1.5 ignore_passive_fiber_force=false
      PathPoint P1: femur_r (0.0007029746 -0.1339167 0.007237124)
      PathPoint P2: calcn_r (0.001546544 0.01089611 -0.001862883)
      PathWrap gaslat1: wrap_object=GasLat_at_shank_r method=hybrid
      PathWrap gaslat2: wrap_object=GasLat_at_condyles_r method=hybrid
    DeGrooteFregly2016Muscle gasmed_r: max_isometric_force=3116 optimal_fiber_length=0.059 tendon_slack_length=0.387
        pennation_angle_at_optimal=0.1656816 activation_time_constant=0.023 deactivation_time_constant=0.074
        active_force_width_scale=1.5 ignore_passive_fiber_force=false
      PathPoint P1: femur_r (0.002108924 -0.1353226 -0.007732721)
      PathPoint P2: calcn_r (0.001546544 0.01089611 -0.001862883)
      PathWrap gasmed1: wrap_object=GasMed_at_shank_r method=hybrid
      PathWrap gasmed2: wrap_object=GasMed_at_condyles_r method=hybrid
    DeGrooteFregly2016Muscle glmax1_r: min_control=0.01 max_isometric_force=983.7836 optimal_fiber_length=0.147
        tendon_slack_length=0.04884089 pennation_angle_at_optimal=0.3540118 max_contraction_velocity=10
        ignore_tendon_compliance=true activation_time_constant=0.01 deactivation_time_constant=0.04
      PathPoint P1: pelvis (-0.04326809 0.01212631 0.01978874)
      PathPoint P2: pelvis (-0.04418196 -0.008505993 0.02738086)
      PathPoint P3: femur_r (-0.01560604 -0.01145849 0.01061492)
      PathPoint P4: femur_r (-0.009736199 -0.01989418 0.0165199)
      PathWrap: wrap_object=Gmax1_at_pelvis_r method=hybrid
    DeGrooteFregly2016Muscle glmax2_r: min_control=0.01 max_isometric_force=1406.046 optimal_fiber_length=0.157
        tendon_slack_length=0.06788715 pennation_angle_at_optimal=0.3673821 max_contraction_velocity=10
        ignore_tendon_compliance=true activation_time_constant=0.01 deactivation_time_constant=0.04
      PathPoint P1: pelvis (-0.04629088 0.00305794 0.01623871)
      PathPoint P2: pelvis (-0.0472399 -0.02140558 0.02857592)
      PathPoint P3: femur_r (-0.01581693 -0.02052686 0.00885748)
      PathPoint P4: femur_r (-0.005483202 -0.03571111 0.01472732)
      PathWrap: wrap_object=Gmax2_at_pelvis_r method=hybrid
    DeGrooteFregly2016Muscle glmax3_r: min_control=0.01 max_isometric_force=947.7541 optimal_fiber_length=0.167
        tendon_slack_length=0.06971661 pennation_angle_at_optimal=0.3824161 max_contraction_velocity=10
        ignore_tendon_compliance=true activation_time_constant=0.01 deactivation_time_constant=0.04
      PathPoint P1: pelvis (-0.04569335 -0.01845308 0.003163386)
      PathPoint P2: pelvis (-0.04474434 -0.04439285 0.0152897)
      PathPoint P3: femur_r (-0.009876794 -0.03954232 0.003303981)
      PathPoint P4: femur_r (-0.002108924 -0.04987605 0.01444613)
      PathWrap: wrap_object=Gmax3_at_pelvis_r method=hybrid
    DeGrooteFregly2016Muscle glmed1_r: min_control=0.01 max_isometric_force=1093.467 optimal_fiber_length=0.073
        tendon_slack_length=0.05581683 pennation_angle_at_optimal=0.3165559 max_contraction_velocity=10
        ignore_tendon_compliance=true activation_time_constant=0.01 deactivation_time_constant=0.04
      PathPoint P1: pelvis (-0.01564119 0.008611439 0.04119431)
      PathPoint P2: femur_r (-0.007662424 -0.004112402 0.01950755)
    DeGrooteFregly2016Muscle glmed2_r: min_control=0.01 max_isometric_force=765.0917 optimal_fiber_length=0.073
        tendon_slack_length=0.06524881 pennation_angle_at_optimal=0.3165559 max_contraction_velocity=10
        ignore_tendon_compliance=true activation_time_constant=0.01 deactivation_time_constant=0.04
      PathPoint P1: pelvis (-0.02987642 0.011107 0.02372539)
      PathPoint P2: femur_r (-0.009068373 -0.002038626 0.01852338)
    DeGrooteFregly2016Muscle glmed3_r: min_control=0.01 max_isometric_force=871.1993 optimal_fiber_length=0.073
        tendon_slack_length=0.04523284 pennation_angle_at_optimal=0.3165559 max_contraction_velocity=10
        ignore_tendon_compliance=true activation_time_constant=0.01 deactivation_time_constant=0.04
      PathPoint P1: pelvis (-0.04049134 -0.002565857 0.01848823)
      PathPoint P2: femur_r (-0.01086096 -0.00165199 0.01820704)
    DeGrooteFregly2016Muscle glmin1_r: min_control=0.01 max_isometric_force=374.0459 optimal_fiber_length=0.068
        tendon_slack_length=0.01613778 pennation_angle_at_optimal=0.1745329 max_contraction_velocity=10
        ignore_tendon_compliance=true activation_time_constant=0.01 deactivation_time_constant=0.04
      PathPoint P1: pelvis (-0.01630901 -0.005237161 0.03662498)
      PathPoint P2: femur_r (-0.002530709 -0.003655468 0.01968329)
    DeGrooteFregly2016Muscle glmin2_r: min_control=0.01 max_isometric_force=394.8197 optimal_fiber_length=0.056
        tendon_slack_length=0.02609905 pennation_angle_at_optimal=0 max_contraction_velocity=10
        ignore_tendon_compliance=true activation_time_constant=0.01 deactivation_time_constant=0.04
      PathPoint P1: pelvis (-0.02165162 -0.00499112 0.03412942)
      PathPoint P2: femur_r (-0.003374278 -0.003655468 0.01968329)
    DeGrooteFregly2016Muscle glmin3_r: min_control=0.01 max_isometric_force=446.7738 optimal_fiber_length=0.038
        tendon_slack_length=0.0508725 pennation_angle_at_optimal=0.01745329 max_contraction_velocity=10
        activation_time_constant=0.01 deactivation_time_constant=0.04
      PathPoint P1: pelvis (-0.02773235 -0.005448053 0.02804869)
      PathPoint P2: femur_r (-0.004745079 -0.002917345 0.0193318)
    DeGrooteFregly2016Muscle grac_r: max_isometric_force=281 optimal_fiber_length=0.2278 tendon_slack_length=0.172
        pennation_angle_at_optimal=0.172 activation_time_constant=0.016 deactivation_time_constant=0.057
        active_force_width_scale=1 ignore_passive_fiber_force=false
      PathPoint P1: pelvis (-0.01664644 -0.04545434 0.008632529)
      PathPoint P2: tibia_r (-0.006474396 -0.01671322 -0.01040754)
      PathPoint P3: tibia_r (0.0006256474 -0.02447055 -0.005528895)
      PathWrap: wrap_object=GR_at_condyles_r method=hybrid
    DeGrooteFregly2016Muscle iliacus_r: max_isometric_force=1021 optimal_fiber_length=0.1066 tendon_slack_length=0.0961
        pennation_angle_at_optimal=0.2799 activation_time_constant=0.021 deactivation_time_constant=0.07
        active_force_width_scale=1 ignore_passive_fiber_force=false
      PathPoint P1: pelvis (-0.02126498 0.01086096 0.02963038)
      PathPoint P2: pelvis (-0.004745079 -0.01957784 0.02657244)
      PathPoint P3: femur_r (-0.0008084208 -0.01985903 0.004885674)
      PathPoint P4: femur_r (-0.004288145 -0.02238974 0.006889151)
      PathWrap: wrap_object=IL_at_brim_r method=hybrid range=(2 3)
    DeGrooteFregly2016Muscle obtext_r: max_isometric_force=109 optimal_fiber_length=0.0492 tendon_slack_length=0.0402
        pennation_angle_at_optimal=0.1222 activation_time_constant=0.006 deactivation_time_constant=0.032
        active_force_width_scale=1 ignore_passive_fiber_force=false
      PathPoint P1: pelvis (-0.02987642 -0.04045619 0.01300503)
      PathPoint P2: femur_r (-0.01230206 -0.01124759 0.01441098)
    DeGrooteFregly2016Muscle pect_r: max_isometric_force=266 optimal_fiber_length=0.08 tendon_slack_length=0.033
        pennation_angle_at_optimal=0 activation_time_constant=0.008 deactivation_time_constant=0.037
        active_force_width_scale=1 ignore_passive_fiber_force=false
      PathPoint P1: pelvis (-0.0151491 -0.02699423 0.01585208)
      PathPoint P2: femur_r (-0.004288145 -0.02889226 0.008892629)
    DeGrooteFregly2016Muscle perbrev_r: max_isometric_force=521 optimal_fiber_length=0.0454 tendon_slack_length=0.1475
        pennation_angle_at_optimal=0.2052 activation_time_constant=0.008 deactivation_time_constant=0.038
        active_force_width_scale=1 ignore_passive_fiber_force=false
      PathPoint P1: tibia_r (-0.008541142 -0.08899659 0.008822332)
      PathPoint P2: tibia_r (-0.01191542 -0.136834 0.008752034)
      PathPoint P3: tibia_r (-0.01001739 -0.1407355 0.008962927)
      PathPoint P4: calcn_r (0.01655505 0.009490158 0.008189654)
      PathPoint P5: calcn_r (0.02379569 0.007697572 0.01205601)
    DeGrooteFregly2016Muscle perlong_r: max_isometric_force=1115 optimal_fiber_length=0.0508 tendon_slack_length=0.3322
        pennation_angle_at_optimal=0.248 activation_time_constant=0.016 deactivation_time_constant=0.058
        active_force_width_scale=1 ignore_passive_fiber_force=false
      PathPoint P1: tibia_r (-0.007029746 -0.04825921 0.009911942)
      PathPoint P2: tibia_r (-0.01114215 -0.1370801 0.008330249)
      PathPoint P3: tibia_r (-0.009560455 -0.141087 0.008435696)
      PathPoint P4: calcn_r (0.01539514 0.008084208 0.00776787)
      PathPoint P5: calcn_r (0.02393629 0.003725766 0.00998224)
      PathPoint P6: calcn_r (0.02994672 0.002425262 0.00414755)
      PathPoint P7: calcn_r (0.04228392 0.002987642 -0.006467367)
    DeGrooteFregly2016Muscle pertert_r: max_isometric_force=180 optimal_fiber_length=0.0709 tendon_slack_length=0.08
        pennation_angle_at_optimal=0.2269 activation_time_constant=0.007 deactivation_time_constant=0.034
        active_force_width_scale=1 ignore_passive_fiber_force=false
      PathPoint per_tert_r-P1: tibia_r (0.0003514873 -0.09855704 0.008119357)
      PathPoint per_tert_r-P2: tibia_r (0.00804906 -0.1377479 0.009103522)
      PathPoint per_tert_r-P3: calcn_r (0.03012246 0.008013911 0.01050947)
    DeGrooteFregly2016Muscle piri_r: max_isometric_force=1030 optimal_fiber_length=0.026 tendon_slack_length=0.1149
        pennation_angle_at_optimal=0.1745 activation_time_constant=0.012 deactivation_time_constant=0.046
        active_force_width_scale=1 ignore_passive_fiber_force=false
      PathPoint P1: pelvis (-0.03578492 -0.002295212 0.004748594)
      PathPoint P2: pelvis (-0.03585874 -0.0107766 0.02141261)
      PathPoint P3: femur_r (-0.005202012 -0.001265354 0.01536)
    DeGrooteFregly2016Muscle psoas_r: max_isometric_force=1427 optimal_fiber_length=0.1169 tendon_slack_length=0.0995
        pennation_angle_at_optimal=0.2155251 activation_time_constant=0.049 deactivation_time_constant=0.139
        active_force_width_scale=1 ignore_passive_fiber_force=false
      PathPoint P1: pelvis (-0.02130013 0.02179221 0.01370801)
      PathPoint P2: pelvis (-0.00720549 -0.02298727 0.02305757)
      PathPoint P3: femur_r (-0.004639633 -0.01641446 0.001616842)
      PathPoint P4: femur_r (-0.008259952 -0.01841794 0.003093088)
      PathWrap: wrap_object=PS_at_brim_r method=hybrid range=(2 3)
    DeGrooteFregly2016Muscle quadfem_r: max_isometric_force=381 optimal_fiber_length=0.054 tendon_slack_length=0.024
        pennation_angle_at_optimal=0 activation_time_constant=0.011 deactivation_time_constant=0.045
        active_force_width_scale=1 ignore_passive_fiber_force=false
      PathPoint quad_fem_r-P1: pelvis (-0.040175 -0.04045619 0.01827734)
      PathPoint quad_fem_r-P2: femur_r (-0.01339167 -0.01261839 0.01286444)
    DeGrooteFregly2016Muscle recfem_r: max_isometric_force=2192 optimal_fiber_length=0.0759 tendon_slack_length=0.4504
        pennation_angle_at_optimal=0.217 activation_time_constant=0.016 deactivation_time_constant=0.057
        active_force_width_scale=1.5 ignore_passive_fiber_force=false
      PathPoint P1: pelvis (-0.008435696 -0.01363771 0.03279377)
      PathPoint P2: patella_r (0.01 0.049 0.0007)
      PathPoint P3: patella_r (0.0121 0.0437 -0.001)
      PathPoint P4: patella_r (0.005 0.00247 3e-5)
      PathPoint P5: tibia_r (0.01145849 -0.02218588 -0.000165199)
      PathWrap: wrap_object=KnExt_at_fem_r method=hybrid
    DeGrooteFregly2016Muscle sart_r: max_isometric_force=249 optimal_fiber_length=0.403 tendon_slack_length=0.124
        pennation_angle_at_optimal=0.0261 activation_time_constant=0.017 deactivation_time_constant=0.059
        active_force_width_scale=1 ignore_passive_fiber_force=false
      PathPoint P1: pelvis (-0.006854003 -0.005483202 0.03711706)
      PathPoint P2: femur_r (-0.001054462 -0.1254107 -0.01479762)
      PathPoint P3: tibia_r (-0.008822332 -0.01409464 -0.01282929)
      PathPoint P4: tibia_r (-0.005588648 -0.02105409 -0.009279265)
      PathPoint P5: tibia_r (0.004780228 -0.02847047 -0.000913867)
    DeGrooteFregly2016Muscle semimem_r: max_isometric_force=2201 optimal_fiber_length=0.086 tendon_slack_length=0.335
        pennation_angle_at_optimal=0.2546 activation_time_constant=0.035 deactivation_time_constant=0.106
        active_force_width_scale=1.5 ignore_passive_fiber_force=false
      PathPoint P1: pelvis (-0.0346918 -0.04006955 0.02158132)
      PathPoint P2: tibia_r (-0.009490158 -0.01441098 -0.006889151)
      PathWrap: wrap_object=SM_at_condyles_r method=hybrid
    DeGrooteFregly2016Muscle semiten_r: max_isometric_force=591 optimal_fiber_length=0.193 tendon_slack_length=0.2472
        pennation_angle_at_optimal=0.2413 activation_time_constant=0.019 deactivation_time_constant=0.065
        active_force_width_scale=1.5 ignore_passive_fiber_force=false
      PathPoint P1: pelvis (-0.03648438 -0.04404136 0.0181016)
      PathPoint P2: tibia_r (-0.0109664 -0.01785556 -0.00804906)
      PathPoint P3: tibia_r (0.0006678259 -0.02716997 -0.004112402)
      PathWrap: wrap_object=ST_at_condyles_r method=hybrid
    DeGrooteFregly2016Muscle soleus_r: max_isometric_force=6194 optimal_fiber_length=0.044 tendon_slack_length=0.2814
        pennation_angle_at_optimal=0.3814289 activation_time_constant=0.074 deactivation_time_constant=0.202
        active_force_width_scale=1 ignore_passive_fiber_force=false
      PathPoint P1: tibia_r (-0.002671304 -0.03219624 0.003444576)
      PathPoint P2: calcn_r (0.001546544 0.01089611 -0.001862883)
    DeGrooteFregly2016Muscle tfl_r: min_control=0.01 max_isometric_force=411.2066 optimal_fiber_length=0.095
        tendon_slack_length=0.4494971 pennation_angle_at_optimal=0.05235988 max_contraction_velocity=10
        activation_time_constant=0.01 deactivation_time_constant=0.04
      PathPoint P1: pelvis (-0.01093126 0.007521829 0.04361958)
      PathPoint P2: femur_r (0.01033373 -0.03497299 0.02098379)
      PathPoint P3: femur_r (0.003760914 -0.1423524 0.01138819)
      PathPoint P4: tibia_r (0.003796063 -0.01441098 0.01216146)
    DeGrooteFregly2016Muscle tibant_r: max_isometric_force=1227 optimal_fiber_length=0.0683 tendon_slack_length=0.2405
        pennation_angle_at_optimal=0.1951828 activation_time_constant=0.023 deactivation_time_constant=0.074
        active_force_width_scale=1 ignore_passive_fiber_force=false
      PathPoint P1: tibia_r (0.005412905 -0.04611514 0.005694095)
      PathPoint P2: tibia_r (0.008822332 -0.06699348 0.004499038)
      PathPoint P3: tibia_r (0.008189654 -0.1286092 -0.004639633)
      PathPoint P4: calcn_r (0.04098342 0.006256474 -0.01072036)
    DeGrooteFregly2016Muscle tibpost_r: max_isometric_force=1730 optimal_fiber_length=0.0378 tendon_slack_length=0.2808
        pennation_angle_at_optimal=0.2265 activation_time_constant=0.019 deactivation_time_constant=0.066
        active_force_width_scale=1 ignore_passive_fiber_force=false
      PathPoint P1: tibia_r (-0.001441098 -0.04583395 0.003620319)
      PathPoint P2: tibia_r (-0.005764392 -0.1284686 -0.006151028)
      PathPoint P3: calcn_r (0.01465702 0.01173968 -0.01005254)
      PathPoint P4: calcn_r (0.02713482 0.005588648 -0.009876794)
    DeGrooteFregly2016Muscle tricox_r: max_isometric_force=565 optimal_fiber_length=0.057 tendon_slack_length=0.058
        pennation_angle_at_optimal=0 activation_time_constant=0.01 deactivation_time_constant=0.042
        active_force_width_scale=1 ignore_passive_fiber_force=false
      PathPoint P1: pelvis (-0.03901509 -0.03585171 0.01300503)
      PathPoint P2: pelvis (-0.04639633 -0.02987642 0.0221437)
      PathPoint P3: femur_r (-0.00499112 -0.001159908 0.01557089)
    DeGrooteFregly2016Muscle vasint_r: max_isometric_force=1697 optimal_fiber_length=0.117 tendon_slack_length=0.205
        pennation_angle_at_optimal=0.06309973 activation_time_constant=0.026 deactivation_time_constant=0.082
        active_force_width_scale=1 ignore_passive_fiber_force=false
      PathPoint P1: femur_r (0.01019313 -0.06762616 0.01089611)
      PathPoint P2: femur_r (0.01177483 -0.07324996 0.01001739)
      PathPoint P3: patella_r (0.0058 0.048 -0.0006)
      PathPoint P4: patella_r (0.005 0.00247 -0.00039)
      PathPoint P5: tibia_r (0.01144794 -0.022214 0.0001511395)
      PathWrap: wrap_object=KnExt_at_fem_r method=hybrid
    DeGrooteFregly2016Muscle vaslat_r: max_isometric_force=5149 optimal_fiber_length=0.117 tendon_slack_length=0.221
        pennation_angle_at_optimal=0.2529 activation_time_constant=0.047 deactivation_time_constant=0.135
        active_force_width_scale=1 ignore_passive_fiber_force=false
      PathPoint P1: femur_r (0.001687139 -0.06516575 0.01226691)
      PathPoint P2: femur_r (0.009455009 -0.09107036 0.01437583)
      PathPoint P3: patella_r (0.0103 0.0423 0.0141)
      PathPoint P4: patella_r (0.005 0.00247 0.00733)
      PathPoint P5: tibia_r (0.0114374 -0.02227727 0.0017961)
      PathWrap: wrap_object=KnExtVL_at_fem_r method=hybrid
    DeGrooteFregly2016Muscle vasmed_r: max_isometric_force=2748 optimal_fiber_length=0.11 tendon_slack_length=0.208
        pennation_angle_at_optimal=0.4222 activation_time_constant=0.035 deactivation_time_constant=0.105
        active_force_width_scale=1 ignore_passive_fiber_force=false
      PathPoint P1: femur_r (0.004920822 -0.07377719 0.006607962)
      PathPoint P2: femur_r (0.01251295 -0.09732684 0.0003163386)
      PathPoint P3: patella_r (0.0063 0.0445 -0.017)
      PathPoint P4: patella_r (0.005 0.00247 -0.0085)
      PathPoint P5: tibia_r (0.01121245 -0.02234405 -0.002383084)
      PathWrap: wrap_object=KnExt_at_fem_r method=hybrid
    DeGrooteFregly2016Muscle addbrev_l: max_isometric_force=626 optimal_fiber_length=0.1031 tendon_slack_length=0.0355
        pennation_angle_at_optimal=0.1148 activation_time_constant=0.016 deactivation_time_constant=0.057
        active_force_width_scale=1 ignore_passive_fiber_force=false
      PathPoint P1: pelvis (-0.006713408 -0.03303981 -0.005412905)
      PathPoint P2: femur_l (-0.0007029746 -0.0414755 -0.008752034)
      PathWrap: wrap_object=AB_at_femshaft_l method=hybrid
    DeGrooteFregly2016Muscle addlong_l: max_isometric_force=917 optimal_fiber_length=0.1082 tendon_slack_length=0.1318
        pennation_angle_at_optimal=0.1378 activation_time_constant=0.018 deactivation_time_constant=0.062
        active_force_width_scale=1 ignore_passive_fiber_force=false
      PathPoint P1: pelvis (-0.002664274 -0.03124722 -0.006636081)
      PathPoint P2: femur_l (0.003957747 -0.08413552 -0.005564044)
      PathWrap: wrap_object=AL_at_femshaft_l method=hybrid
    DeGrooteFregly2016Muscle addmagMid_l: max_isometric_force=2389 optimal_fiber_length=0.1377
        tendon_slack_length=0.0466 pennation_angle_at_optimal=0.2073 activation_time_constant=0.05
        deactivation_time_constant=0.142 active_force_width_scale=1 ignore_passive_fiber_force=false
      PathPoint P1: pelvis (-0.01850932 -0.04244209 -0.01003145)
      PathPoint P2: femur_l (0.0008505993 -0.05708154 -0.01027046)
      PathWrap: wrap_object=AMmid_at_femshaft_l method=hybrid
    DeGrooteFregly2016Muscle bflh_l: max_isometric_force=1313 optimal_fiber_length=0.0976 tendon_slack_length=0.3325
        pennation_angle_at_optimal=0.1759182 activation_time_constant=0.027 deactivation_time_constant=0.084
        active_force_width_scale=1.5 ignore_passive_fiber_force=false
      PathPoint P1: pelvis (-0.03655468 -0.04186214 -0.02059716)
      PathPoint P2: tibia_l (-0.0120771 -0.01282226 -0.01271681)
      PathPoint P3: tibia_l (-0.009504217 -0.01760248 -0.0122177)
    DeGrooteFregly2016Muscle bfsh_l: max_isometric_force=557 optimal_fiber_length=0.1103 tendon_slack_length=0.1058
        pennation_angle_at_optimal=0.2642 activation_time_constant=0.012 deactivation_time_constant=0.048
        active_force_width_scale=1 ignore_passive_fiber_force=false
      PathPoint P1: femur_l (0.001757437 -0.07419897 -0.008224803)
      PathPoint P2: tibia_l (-0.01007363 -0.01154284 -0.01126165)
      PathWrap: wrap_object=BF140_at_gastroc_l method=hybrid
    DeGrooteFregly2016Muscle edl_l: max_isometric_force=603 optimal_fiber_length=0.0693 tendon_slack_length=0.3689
        pennation_angle_at_optimal=0.2183 activation_time_constant=0.009 deactivation_time_constant=0.041
        active_force_width_scale=1.5 ignore_passive_fiber_force=false
      PathPoint P1: tibia_l (-0.005623797 -0.04066708 -0.00720549)
      PathPoint P2: tibia_l (0.005764392 -0.1321592 -0.003936658)
      PathPoint P3: calcn_l (0.03230168 0.01265354 -0.0002811899)
      PathPoint P4: calcn_l (0.05680035 0.00193318 -0.004569335)
      PathPoint P5: toes_l (0.0001054462 0.00165199 -0.005377756)
      PathPoint P6: toes_l (0.01557089 -0.0001405949 -0.008787183)
    DeGrooteFregly2016Muscle ehl_l: max_isometric_force=286 optimal_fiber_length=0.0748 tendon_slack_length=0.3268
        pennation_angle_at_optimal=0.1972681 activation_time_constant=0.01 deactivation_time_constant=0.043
        active_force_width_scale=1.5 ignore_passive_fiber_force=false
      PathPoint P1: tibia_l (-0.004920822 -0.05448053 -0.00664311)
      PathPoint P2: tibia_l (0.00249556 -0.1022477 -0.005764392)
      PathPoint P3: tibia_l (0.007029746 -0.1298043 0.0009841645)
      PathPoint P4: calcn_l (0.03409427 0.01367286 0.007416382)
      PathPoint P5: calcn_l (0.04544731 0.01086096 0.009033224)
      PathPoint P6: calcn_l (0.0609479 0.004885674 0.009841645)
      PathPoint P7: toes_l (0.01047432 0.001441098 0.008611439)
      PathPoint P8: toes_l (0.01978874 0.001195057 0.006537664)
    DeGrooteFregly2016Muscle fdl_l: max_isometric_force=423 optimal_fiber_length=0.0446 tendon_slack_length=0.3788
        pennation_angle_at_optimal=0.2248 activation_time_constant=0.007 deactivation_time_constant=0.035
        active_force_width_scale=1.5 ignore_passive_fiber_force=false
      PathPoint P1: tibia_l (-0.0008084208 -0.06439248 0.0006326772)
      PathPoint P2: tibia_l (-0.006186177 -0.1281171 0.004358443)
      PathPoint P3: calcn_l (0.01532485 0.01107185 0.009841645)
      PathPoint P4: calcn_l (0.0248853 0.006186177 0.009244116)
      PathPoint P5: calcn_l (0.0582766 -0.002847047 -0.004077253)
      PathPoint P6: toes_l (-0.0006678259 -0.002741601 -0.005166864)
      PathPoint P7: toes_l (0.01001739 -0.00249556 -0.007556977)
      PathPoint P8: toes_l (0.01550059 -0.002108924 -0.008505993)
    DeGrooteFregly2016Muscle fhl_l: max_isometric_force=908 optimal_fiber_length=0.0527 tendon_slack_length=0.3543
        pennation_angle_at_optimal=0.258 activation_time_constant=0.01 deactivation_time_constant=0.042
        active_force_width_scale=1.5 ignore_passive_fiber_force=false
      PathPoint P1: tibia_l (-0.01089611 -0.07602671 -0.007029746)
      PathPoint P2: tibia_l (-0.008505993 -0.129031 0.002671304)
      PathPoint P3: calcn_l (0.01314563 0.00970105 0.008470844)
      PathPoint P4: calcn_l (0.03648438 0.002390114 0.008998075)
      PathPoint P5: calcn_l (0.06066671 -0.001862883 0.009455009)
      PathPoint P6: toes_l (0.005448053 -0.002249519 0.009314414)
      PathPoint P7: toes_l (0.01975359 -0.003585171 0.00636192)
    DeGrooteFregly2016Muscle gaslat_l: max_isometric_force=1575 optimal_fiber_length=0.069 tendon_slack_length=0.374
        pennation_angle_at_optimal=0.2102 activation_time_constant=0.016 deactivation_time_constant=0.058
        active_force_width_scale=1.5 ignore_passive_fiber_force=false
      PathPoint P1: femur_l (0.0007029746 -0.1339167 -0.007237124)
      PathPoint P2: calcn_l (0.001546544 0.01089611 0.001862883)
      PathWrap gaslat1: wrap_object=GasLat_at_shank_l method=hybrid
      PathWrap gaslat2: wrap_object=GasLat_at_condyles_l method=hybrid
    DeGrooteFregly2016Muscle gasmed_l: max_isometric_force=3116 optimal_fiber_length=0.059 tendon_slack_length=0.387
        pennation_angle_at_optimal=0.1656816 activation_time_constant=0.023 deactivation_time_constant=0.074
        active_force_width_scale=1.5 ignore_passive_fiber_force=false
      PathPoint P1: femur_l (0.002108924 -0.1353226 0.007732721)
      PathPoint P2: calcn_l (0.001546544 0.01089611 0.001862883)
      PathWrap gasmed1: wrap_object=GasMed_at_shank_l method=hybrid
      PathWrap gasmed2: wrap_object=GasMed_at_condyles_l method=hybrid
    DeGrooteFregly2016Muscle glmax1_l: min_control=0.01 max_isometric_force=983.7836 optimal_fiber_length=0.147
        tendon_slack_length=0.04884089 pennation_angle_at_optimal=0.3540118 max_contraction_velocity=10
        ignore_tendon_compliance=true activation_time_constant=0.01 deactivation_time_constant=0.04
      PathPoint P1: pelvis (-0.04326809 0.01212631 -0.01978874)
      PathPoint P2: pelvis (-0.04418196 -0.008505993 -0.02738086)
      PathPoint P3: femur_l (-0.01560604 -0.01145849 -0.01061492)
      PathPoint P4: femur_l (-0.009736199 -0.01989418 -0.0165199)
      PathWrap: wrap_object=Gmax1_at_pelvis_l method=hybrid
    DeGrooteFregly2016Muscle glmax2_l: min_control=0.01 max_isometric_force=1406.046 optimal_fiber_length=0.157
        tendon_slack_length=0.06788715 pennation_angle_at_optimal=0.3673821 max_contraction_velocity=10
        ignore_tendon_compliance=true activation_time_constant=0.01 deactivation_time_constant=0.04
      PathPoint P1: pelvis (-0.04629088 0.00305794 -0.01623871)
      PathPoint P2: pelvis (-0.0472399 -0.02140558 -0.02857592)
      PathPoint P3: femur_l (-0.01581693 -0.02052686 -0.00885748)
      PathPoint P4: femur_l (-0.005483202 -0.03571111 -0.01472732)
      PathWrap: wrap_object=Gmax2_at_pelvis_l method=hybrid
    DeGrooteFregly2016Muscle glmax3_l: min_control=0.01 max_isometric_force=947.7541 optimal_fiber_length=0.167
        tendon_slack_length=0.06971661 pennation_angle_at_optimal=0.3824161 max_contraction_velocity=10
        ignore_tendon_compliance=true activation_time_constant=0.01 deactivation_time_constant=0.04
      PathPoint P1: pelvis (-0.04569335 -0.01845308 -0.003163386)
      PathPoint P2: pelvis (-0.04474434 -0.04439285 -0.0152897)
      PathPoint P3: femur_l (-0.009876794 -0.03954232 -0.003303981)
      PathPoint P4: femur_l (-0.002108924 -0.04987605 -0.01444613)
      PathWrap: wrap_object=Gmax3_at_pelvis_l method=hybrid
    DeGrooteFregly2016Muscle glmed1_l: min_control=0.01 max_isometric_force=1093.467 optimal_fiber_length=0.073
        tendon_slack_length=0.05581683 pennation_angle_at_optimal=0.3165559 max_contraction_velocity=10
        ignore_tendon_compliance=true activation_time_constant=0.01 deactivation_time_constant=0.04
      PathPoint P1: pelvis (-0.01564119 0.008611439 -0.04119431)
      PathPoint P2: femur_l (-0.007662424 -0.004112402 -0.01950755)
    DeGrooteFregly2016Muscle glmed2_l: min_control=0.01 max_isometric_force=765.0917 optimal_fiber_length=0.073
        tendon_slack_length=0.06524881 pennation_angle_at_optimal=0.3165559 max_contraction_velocity=10
        ignore_tendon_compliance=true activation_time_constant=0.01 deactivation_time_constant=0.04
      PathPoint P1: pelvis (-0.02987642 0.011107 -0.02372539)
      PathPoint P2: femur_l (-0.009068373 -0.002038626 -0.01852338)
    DeGrooteFregly2016Muscle glmed3_l: min_control=0.01 max_isometric_force=871.1993 optimal_fiber_length=0.073
        tendon_slack_length=0.04523284 pennation_angle_at_optimal=0.3165559 max_contraction_velocity=10
        ignore_tendon_compliance=true activation_time_constant=0.01 deactivation_time_constant=0.04
      PathPoint P1: pelvis (-0.04049134 -0.002565857 -0.01848823)
      PathPoint P2: femur_l (-0.01086096 -0.00165199 -0.01820704)
    DeGrooteFregly2016Muscle glmin1_l: min_control=0.01 max_isometric_force=374.0459 optimal_fiber_length=0.068
        tendon_slack_length=0.01613778 pennation_angle_at_optimal=0.1745329 max_contraction_velocity=10
        ignore_tendon_compliance=true activation_time_constant=0.01 deactivation_time_constant=0.04
      PathPoint P1: pelvis (-0.01630901 -0.005237161 -0.03662498)
      PathPoint P2: femur_l (-0.002530709 -0.003655468 -0.01968329)
    DeGrooteFregly2016Muscle glmin2_l: min_control=0.01 max_isometric_force=394.8197 optimal_fiber_length=0.056
        tendon_slack_length=0.02609905 pennation_angle_at_optimal=0 max_contraction_velocity=10
        ignore_tendon_compliance=true activation_time_constant=0.01 deactivation_time_constant=0.04
      PathPoint P1: pelvis (-0.02165162 -0.00499112 -0.03412942)
      PathPoint P2: femur_l (-0.003374278 -0.003655468 -0.01968329)
    DeGrooteFregly2016Muscle glmin3_l: min_control=0.01 max_isometric_force=446.7738 optimal_fiber_length=0.038
        tendon_slack_length=0.0508725 pennation_angle_at_optimal=0.01745329 max_contraction_velocity=10
        activation_time_constant=0.01 deactivation_time_constant=0.04
      PathPoint P1: pelvis (-0.02773235 -0.005448053 -0.02804869)
      PathPoint P2: femur_l (-0.004745079 -0.002917345 -0.0193318)
    DeGrooteFregly2016Muscle grac_l: max_isometric_force=281 optimal_fiber_length=0.2278 tendon_slack_length=0.172
        pennation_angle_at_optimal=0.172 activation_time_constant=0.016 deactivation_time_constant=0.057
        active_force_width_scale=1 ignore_passive_fiber_force=false
      PathPoint P1: pelvis (-0.01664644 -0.04545434 -0.008632529)
      PathPoint P2: tibia_l (-0.006474396 -0.01671322 0.01040754)
      PathPoint P3: tibia_l (0.0006256474 -0.02447055 0.005528895)
      PathWrap: wrap_object=GR_at_condyles_l method=hybrid
    DeGrooteFregly2016Muscle iliacus_l: max_isometric_force=1021 optimal_fiber_length=0.1066 tendon_slack_length=0.0961
        pennation_angle_at_optimal=0.2799 activation_time_constant=0.021 deactivation_time_constant=0.07
        active_force_width_scale=1 ignore_passive_fiber_force=false
      PathPoint P1: pelvis (-0.02126498 0.01086096 -0.02963038)
      PathPoint P2: pelvis (-0.004745079 -0.01957784 -0.02657244)
      PathPoint P3: femur_l (-0.0008084208 -0.01985903 -0.004885674)
      PathPoint P4: femur_l (-0.004288145 -0.02238974 -0.006889151)
      PathWrap: wrap_object=IL_at_brim_l method=hybrid range=(2 3)
    DeGrooteFregly2016Muscle obtext_l: max_isometric_force=109 optimal_fiber_length=0.0492 tendon_slack_length=0.0402
        pennation_angle_at_optimal=0.1222 activation_time_constant=0.006 deactivation_time_constant=0.032
        active_force_width_scale=1 ignore_passive_fiber_force=false
      PathPoint P1: pelvis (-0.02987642 -0.04045619 -0.01300503)
      PathPoint P2: femur_l (-0.01230206 -0.01124759 -0.01441098)
    DeGrooteFregly2016Muscle pect_l: max_isometric_force=266 optimal_fiber_length=0.08 tendon_slack_length=0.033
        pennation_angle_at_optimal=0 activation_time_constant=0.008 deactivation_time_constant=0.037
        active_force_width_scale=1 ignore_passive_fiber_force=false
      PathPoint P1: pelvis (-0.0151491 -0.02699423 -0.01585208)
      PathPoint P2: femur_l (-0.004288145 -0.02889226 -0.008892629)
    DeGrooteFregly2016Muscle perbrev_l: max_isometric_force=521 optimal_fiber_length=0.0454 tendon_slack_length=0.1475
        pennation_angle_at_optimal=0.2052 activation_time_constant=0.008 deactivation_time_constant=0.038
        active_force_width_scale=1 ignore_passive_fiber_force=false
      PathPoint P1: tibia_l (-0.008541142 -0.08899659 -0.008822332)
      PathPoint P2: tibia_l (-0.01191542 -0.136834 -0.008752034)
      PathPoint P3: tibia_l (-0.01001739 -0.1407355 -0.008962927)
      PathPoint P4: calcn_l (0.01655505 0.009490158 -0.008189654)
      PathPoint P5: calcn_l (0.02379569 0.007697572 -0.01205601)
    DeGrooteFregly2016Muscle perlong_l: max_isometric_force=1115 optimal_fiber_length=0.0508 tendon_slack_length=0.3322
        pennation_angle_at_optimal=0.248 activation_time_constant=0.016 deactivation_time_constant=0.058
        active_force_width_scale=1 ignore_passive_fiber_force=false
      PathPoint P1: tibia_l (-0.007029746 -0.04825921 -0.009911942)
      PathPoint P2: tibia_l (-0.01114215 -0.1370801 -0.008330249)
      PathPoint P3: tibia_l (-0.009560455 -0.141087 -0.008435696)
      PathPoint P4: calcn_l (0.01539514 0.008084208 -0.00776787)
      PathPoint P5: calcn_l (0.02393629 0.003725766 -0.00998224)
      PathPoint P6: calcn_l (0.02994672 0.002425262 -0.00414755)
      PathPoint P7: calcn_l (0.04228392 0.002987642 0.006467367)
    DeGrooteFregly2016Muscle pertert_l: max_isometric_force=180 optimal_fiber_length=0.0709 tendon_slack_length=0.08
        pennation_angle_at_optimal=0.2269 activation_time_constant=0.007 deactivation_time_constant=0.034
        active_force_width_scale=1 ignore_passive_fiber_force=false
      PathPoint per_tert_l-P1: tibia_l (0.0003514873 -0.09855704 -0.008119357)
      PathPoint per_tert_l-P2: tibia_l (0.00804906 -0.1377479 -0.009103522)
      PathPoint per_tert_l-P3: calcn_l (0.03012246 0.008013911 -0.01050947)
    DeGrooteFregly2016Muscle piri_l: max_isometric_force=1030 optimal_fiber_length=0.026 tendon_slack_length=0.1149
        pennation_angle_at_optimal=0.1745 activation_time_constant=0.012 deactivation_time_constant=0.046
        active_force_width_scale=1 ignore_passive_fiber_force=false
      PathPoint P1: pelvis (-0.03578492 -0.002295212 -0.004748594)
      PathPoint P2: pelvis (-0.03585874 -0.0107766 -0.02141261)
      PathPoint P3: femur_l (-0.005202012 -0.001265354 -0.01536)
    DeGrooteFregly2016Muscle psoas_l: max_isometric_force=1427 optimal_fiber_length=0.1169 tendon_slack_length=0.0995
        pennation_angle_at_optimal=0.2155251 activation_time_constant=0.049 deactivation_time_constant=0.139
        active_force_width_scale=1 ignore_passive_fiber_force=false
      PathPoint P1: pelvis (-0.02130013 0.02179221 -0.01370801)
      PathPoint P2: pelvis (-0.00720549 -0.02298727 -0.02305757)
      PathPoint P3: femur_l (-0.004639633 -0.01641446 -0.001616842)
      PathPoint P4: femur_l (-0.008259952 -0.01841794 -0.003093088)
      PathWrap: wrap_object=PS_at_brim_l method=hybrid range=(2 3)
    DeGrooteFregly2016Muscle quadfem_l: max_isometric_force=381 optimal_fiber_length=0.054 tendon_slack_length=0.024
        pennation_angle_at_optimal=0 activation_time_constant=0.011 deactivation_time_constant=0.045
        active_force_width_scale=1 ignore_passive_fiber_force=false
      PathPoint quad_fem_l-P1: pelvis (-0.040175 -0.04045619 -0.01827734)
      PathPoint quad_fem_l-P2: femur_l (-0.01339167 -0.01261839 -0.01286444)
    DeGrooteFregly2016Muscle recfem_l: max_isometric_force=2192 optimal_fiber_length=0.0759 tendon_slack_length=0.4504
        pennation_angle_at_optimal=0.217 activation_time_constant=0.016 deactivation_time_constant=0.057
        active_force_width_scale=1.5 ignore_passive_fiber_force=false
      PathPoint P1: pelvis (-0.008435696 -0.01363771 -0.03279377)
      PathPoint P2: patella_l (0.01 0.049 -0.0007)
      PathPoint P3: patella_l (0.0121 0.0437 0.001)
      PathPoint P4: patella_l (0.005 0.00247 -3e-5)
      PathPoint P5: tibia_l (0.01145849 -0.02218588 0.000165199)
      PathWrap: wrap_object=KnExt_at_fem_l method=hybrid
    DeGrooteFregly2016Muscle sart_l: max_isometric_force=249 optimal_fiber_length=0.403 tendon_slack_length=0.124
        pennation_angle_at_optimal=0.0261 activation_time_constant=0.017 deactivation_time_constant=0.059
        active_force_width_scale=1 ignore_passive_fiber_force=false
      PathPoint P1: pelvis (-0.006854003 -0.005483202 -0.03711706)
      PathPoint P2: femur_l (-0.001054462 -0.1254107 0.01479762)
      PathPoint P3: tibia_l (-0.008822332 -0.01409464 0.01282929)
      PathPoint P4: tibia_l (-0.005588648 -0.02105409 0.009279265)
      PathPoint P5: tibia_l (0.004780228 -0.02847047 0.000913867)
    DeGrooteFregly2016Muscle semimem_l: max_isometric_force=2201 optimal_fiber_length=0.086 tendon_slack_length=0.335
        pennation_angle_at_optimal=0.2546 activation_time_constant=0.035 deactivation_time_constant=0.106
        active_force_width_scale=1.5 ignore_passive_fiber_force=false
      PathPoint P1: pelvis (-0.0346918 -0.04006955 -0.02158132)
      PathPoint P2: tibia_l (-0.009490158 -0.01441098 0.006889151)
      PathWrap: wrap_object=SM_at_condyles_l method=hybrid
    DeGrooteFregly2016Muscle semiten_l: max_isometric_force=591 optimal_fiber_length=0.193 tendon_slack_length=0.2472
        pennation_angle_at_optimal=0.2413 activation_time_constant=0.019 deactivation_time_constant=0.065
        active_force_width_scale=1.5 ignore_passive_fiber_force=false
      PathPoint P1: pelvis (-0.03648438 -0.04404136 -0.0181016)
      PathPoint P2: tibia_l (-0.0109664 -0.01785556 0.00804906)
      PathPoint P3: tibia_l (0.0006678259 -0.02716997 0.004112402)
      PathWrap: wrap_object=ST_at_condyles_l method=hybrid
    DeGrooteFregly2016Muscle soleus_l: max_isometric_force=6194 optimal_fiber_length=0.044 tendon_slack_length=0.2814
        pennation_angle_at_optimal=0.3814289 activation_time_constant=0.074 deactivation_time_constant=0.202
        active_force_width_scale=1 ignore_passive_fiber_force=false
      PathPoint P1: tibia_l (-0.002671304 -0.03219624 -0.003444576)
      PathPoint P2: calcn_l (0.001546544 0.01089611 0.001862883)
    DeGrooteFregly2016Muscle tfl_l: min_control=0.01 max_isometric_force=411.2066 optimal_fiber_length=0.095
        tendon_slack_length=0.4494971 pennation_angle_at_optimal=0.05235988 max_contraction_velocity=10
        activation_time_constant=0.01 deactivation_time_constant=0.04
      PathPoint P1: pelvis (-0.01093126 0.007521829 -0.04361958)
      PathPoint P2: femur_l (0.01033373 -0.03497299 -0.02098379)
      PathPoint P3: femur_l (0.003760914 -0.1423524 -0.01138819)
      PathPoint P4: tibia_l (0.003796063 -0.01441098 -0.01216146)
    DeGrooteFregly2016Muscle tibant_l: max_isometric_force=1227 optimal_fiber_length=0.0683 tendon_slack_length=0.2405
        pennation_angle_at_optimal=0.1951828 activation_time_constant=0.023 deactivation_time_constant=0.074
        active_force_width_scale=1 ignore_passive_fiber_force=false
      PathPoint P1: tibia_l (0.005412905 -0.04611514 -0.005694095)
      PathPoint P2: tibia_l (0.008822332 -0.06699348 -0.004499038)
      PathPoint P3: tibia_l (0.008189654 -0.1286092 0.004639633)
      PathPoint P4: calcn_l (0.04098342 0.006256474 0.01072036)
    DeGrooteFregly2016Muscle tibpost_l: max_isometric_force=1730 optimal_fiber_length=0.0378 tendon_slack_length=0.2808
        pennation_angle_at_optimal=0.2265 activation_time_constant=0.019 deactivation_time_constant=0.066
        active_force_width_scale=1 ignore_passive_fiber_force=false
      PathPoint P1: tibia_l (-0.001441098 -0.04583395 -0.003620319)
      PathPoint P2: tibia_l (-0.005764392 -0.1284686 0.006151028)
      PathPoint P3: calcn_l (0.01465702 0.01173968 0.01005254)
      PathPoint P4: calcn_l (0.02713482 0.005588648 0.009876794)
    DeGrooteFregly2016Muscle tricox_l: max_isometric_force=565 optimal_fiber_length=0.057 tendon_slack_length=0.058
        pennation_angle_at_optimal=0 activation_time_constant=0.01 deactivation_time_constant=0.042
        active_force_width_scale=1 ignore_passive_fiber_force=false
      PathPoint P1: pelvis (-0.03901509 -0.03585171 -0.01300503)
      PathPoint P2: pelvis (-0.04639633 -0.02987642 -0.0221437)
      PathPoint P3: femur_l (-0.00499112 -0.001159908 -0.01557089)
    DeGrooteFregly2016Muscle vasint_l: max_isometric_force=1697 optimal_fiber_length=0.117 tendon_slack_length=0.205
        pennation_angle_at_optimal=0.06309973 activation_time_constant=0.026 deactivation_time_constant=0.082
        active_force_width_scale=1 ignore_passive_fiber_force=false
      PathPoint P1: femur_l (0.01019313 -0.06762616 -0.01089611)
      PathPoint P2: femur_l (0.01177483 -0.07324996 -0.01001739)
      PathPoint P3: patella_l (0.0058 0.048 0.0006)
      PathPoint P4: patella_l (0.005 0.00247 0.00039)
      PathPoint P5: tibia_l (0.01144794 -0.022214 -0.0001511395)
      PathWrap: wrap_object=KnExt_at_fem_l method=hybrid
    DeGrooteFregly2016Muscle vaslat_l: max_isometric_force=5149 optimal_fiber_length=0.117 tendon_slack_length=0.221
        pennation_angle_at_optimal=0.2529 activation_time_constant=0.047 deactivation_time_constant=0.135
        active_force_width_scale=1 ignore_passive_fiber_force=false
      PathPoint P1: femur_l (0.001687139 -0.06516575 -0.01226691)
      PathPoint P2: femur_l (0.009455009 -0.09107036 -0.01437583)
      PathPoint P3: patella_l (0.0103 0.0423 -0.0141)
      PathPoint P4: patella_l (0.005 0.00247 -0.00733)
      PathPoint P5: tibia_l (0.0114374 -0.02227727 -0.0017961)
      PathWrap: wrap_object=KnExtVL_at_fem_l method=hybrid
    DeGrooteFregly2016Muscle vasmed_l: max_isometric_force=2748 optimal_fiber_length=0.11 tendon_slack_length=0.208
        pennation_angle_at_optimal=0.4222 activation_time_constant=0.035 deactivation_time_constant=0.105
        active_force_width_scale=1 ignore_passive_fiber_force=false
      PathPoint P1: femur_l (0.004920822 -0.07377719 -0.006607962)
      PathPoint P2: femur_l (0.01251295 -0.09732684 -0.0003163386)
      PathPoint P3: patella_l (0.0063 0.0445 0.017)
      PathPoint P4: patella_l (0.005 0.00247 0.0085)
      PathPoint P5: tibia_l (0.01121245 -0.02234405 0.002383084)
      PathWrap: wrap_object=KnExt_at_fem_l method=hybrid
    SmoothSphereHalfSpaceForce [values shared by the 22 below unless stated]: socket_half_space=/contactgeometryset/floor
        stiffness=3067776 [N/m^2] dissipation=2 [s/m] static_friction=0.8 dynamic_friction=0.8 viscous_friction=0.8
        transition_velocity=0.2 [m/s] hertz_smoothing=300 hunt_crossley_smoothing=50
    SmoothSphereHalfSpaceForce contactHeel_r_mid: socket_sphere=/contactgeometryset/contactSphere_heel_r_mid
    SmoothSphereHalfSpaceForce contactHeel_r_lat: socket_sphere=/contactgeometryset/contactSphere_heel_r_lat
    SmoothSphereHalfSpaceForce contactHeel_r_med: socket_sphere=/contactgeometryset/contactSphere_heel_r_med
    SmoothSphereHalfSpaceForce contactMid_r_mid: socket_sphere=/contactgeometryset/contactSphere_mid_r_mid
    SmoothSphereHalfSpaceForce contactMid_r_lat: socket_sphere=/contactgeometryset/contactSphere_mid_r_lat
    SmoothSphereHalfSpaceForce contactMid_r_med: socket_sphere=/contactgeometryset/contactSphere_mid_r_med
    SmoothSphereHalfSpaceForce contactMH1_r_mid: socket_sphere=/contactgeometryset/contactSphere_mh1_r_mid
    SmoothSphereHalfSpaceForce contactMH3_r_mid: socket_sphere=/contactgeometryset/contactSphere_mh3_r_mid
    SmoothSphereHalfSpaceForce contactMH5_r_mid: socket_sphere=/contactgeometryset/contactSphere_mh5_r_mid
    SmoothSphereHalfSpaceForce contactHallux_r_mid: socket_sphere=/contactgeometryset/contactSphere_hallux_r_mid
    SmoothSphereHalfSpaceForce contactOtherToes_r_mid: socket_sphere=/contactgeometryset/contactSphere_othertoes_r_mid
    SmoothSphereHalfSpaceForce contactHeel_l_mid: socket_sphere=/contactgeometryset/contactSphere_heel_l_mid
    SmoothSphereHalfSpaceForce contactHeel_l_lat: socket_sphere=/contactgeometryset/contactSphere_heel_l_lat
    SmoothSphereHalfSpaceForce contactHeel_l_med: socket_sphere=/contactgeometryset/contactSphere_heel_l_med
    SmoothSphereHalfSpaceForce contactMid_l_mid: socket_sphere=/contactgeometryset/contactSphere_mid_l_mid
    SmoothSphereHalfSpaceForce contactMid_l_lat: socket_sphere=/contactgeometryset/contactSphere_mid_l_lat
    SmoothSphereHalfSpaceForce contactMid_l_med: socket_sphere=/contactgeometryset/contactSphere_mid_l_med
    SmoothSphereHalfSpaceForce contactMH1_l_mid: socket_sphere=/contactgeometryset/contactSphere_mh1_l_mid
    SmoothSphereHalfSpaceForce contactMH3_l_mid: socket_sphere=/contactgeometryset/contactSphere_mh3_l_mid
    SmoothSphereHalfSpaceForce contactMH5_l_mid: socket_sphere=/contactgeometryset/contactSphere_mh5_l_mid
    SmoothSphereHalfSpaceForce contactHallux_l_mid: socket_sphere=/contactgeometryset/contactSphere_hallux_l_mid
    SmoothSphereHalfSpaceForce contactOtherToes_l_mid: socket_sphere=/contactgeometryset/contactSphere_othertoes_l_mid
  MarkerSet:
    Marker Sternum: torso (0.02700811 0.1198312 0.001128235)
    Marker R.Acromium: torso (0.001735123 0.1342327 0.05289703)
    Marker L.Acromium: torso (0.001735124 0.1342327 -0.05289708)
    Marker Top.Head: torso (-0.01052802 0.234862 -0.0003651297)
    Marker R.ASIS: pelvis (0.006880436 -0.007915975 0.03834179)
    Marker L.ASIS: pelvis (0.004370993 -0.01106759 -0.03727701)
    Marker R.PSIS: pelvis (-0.05956528 0.00940833 0.01506472)
    Marker L.PSIS: pelvis (-0.05956515 0.009767094 -0.01664422)
    Marker R.Great.Tro: femur_r (-0.005053146 -0.007008672 0.02649818)
    Marker L.Great.Tro: femur_l (-0.005053157 -0.007008657 -0.02649817)
    Marker R.Iliac.Crest: pelvis (-0.02341083 0.02314529 0.0465855)
    Marker L.Iliac.Crest: pelvis (-0.02341085 0.0231453 -0.04658543)
    Marker V.Sacral: pelvis (-0.05956515 0.0307124 -0.0009170515)
    Marker R.Thigh.Upper.Post: femur_r (0.007254574 -0.0706379 0.03729248)
    Marker R.Thigh.Upper.Ant: femur_r (0.03041567 -0.06543428 0.02823047)
    Marker R.Thigh.Lower.Ant: femur_r (0.02750681 -0.09711078 0.02479735)
    Marker R.Thigh.Lower.Post: femur_r (0.004845511 -0.1016267 0.03199533)
    Marker R.Knee.Lat: femur_r (0.005226016 -0.150676 0.0223066)
    Marker R.Knee.Med: femur_r (-0.0005019478 -0.156587 -0.02276932)
    Marker R.Shank.Upper.Post: tibia_r (-0.01655053 -0.03829048 0.03002851)
    Marker R.Shank.Upper.Ant: tibia_r (0.008953746 -0.04222878 0.02389086)
    Marker R.Shank.Lower.Ant: tibia_r (0.006623972 -0.06874974 0.0216476)
    Marker R.Shank.Lower.Post: tibia_r (-0.01191212 -0.06693733 0.02872723)
    Marker R.Ankle.Lat: tibia_r (-0.005884412 -0.1354457 0.01422821)
    Marker R.Ankle.Med: tibia_r (-0.0002417077 -0.1341054 -0.01230145)
    Marker R.Heel.Upper: calcn_r (-0.00873131 0.01002414 -0.001798081)
    Marker R.Heel.Med: calcn_r (-0.002371459 -0.0005327633 -0.01427604)
    Marker R.Heel.Lat: calcn_r (-0.0004755414 -0.001135775 0.008286716)
    Marker R.Toe.Lat: calcn_r (0.05837159 0.0003601725 0.01897575)
    Marker R.Toe.Med: calcn_r (0.06716041 0.005657903 -0.02353959)
    Marker R.Toe.Tip: toes_r (0.02067154 0.008242104 -0.006741304)
    Marker L.Thigh.Upper.Post: femur_l (-0.0225267 -0.08473472 -0.02701965)
    Marker L.Thigh.Upper.Ant: femur_l (0.004707584 -0.08331108 -0.03402067)
    Marker L.Thigh.Lower.Ant: femur_l (0.001598125 -0.1149591 -0.03011452)
    Marker L.Thigh.Lower.Post: femur_l (-0.02287775 -0.1180914 -0.02372748)
    Marker L.Knee.Lat: femur_l (0.005247201 -0.1483304 -0.0220071)
    Marker L.Knee.Med: femur_l (-0.0005019485 -0.1565869 0.02276931)
    Marker L.Shank.Upper.Post: tibia_l (-0.0260903 -0.04244346 -0.02832073)
    Marker L.Shank.Upper.Ant: tibia_l (-0.003094852 -0.03940871 -0.03064175)
    Marker L.Shank.Lower.Ant: tibia_l (-0.003730247 -0.06432805 -0.02815196)
    Marker L.Shank.Lower.Post: tibia_l (-0.02835433 -0.0679774 -0.0243465)
    Marker L.Ankle.Lat: tibia_l (-0.005884425 -0.1354456 -0.01422821)
    Marker L.Ankle.Med: tibia_l (-0.0002417076 -0.1341054 0.01230146)
    Marker L.Heel.Upper: calcn_l (-0.008731296 0.01002414 0.001798079)
    Marker L.Heel.Med: calcn_l (-0.001361209 -0.00382722 0.01604096)
    Marker L.Heel.Lat: calcn_l (-0.003771598 -0.002908607 -0.005010133)
    Marker L.Toe.Lat: calcn_l (0.06032795 -0.003240209 -0.02015521)
    Marker L.Toe.Med: calcn_l (0.06642437 0.004277944 0.02165429)
    Marker L.Toe.Tip: toes_l (0.02067153 0.008242096 0.006741316)
    Marker Cervical.Spine: torso (-0.02405738 0.1556 0.0002970102)
    Marker R.Thigh.Upper.Post.Med: femur_r (-0.01442466 -0.09032048 -0.03314033)
    Marker R.Thigh.Upper.Ant.Med: femur_r (0.003872282 -0.0942487 -0.0335715)
    Marker R.Thigh.Lower.Ant.Med: femur_r (0.006789018 -0.1209075 -0.02995489)
    Marker R.Shank.Upper.Post.Med: tibia_r (-0.02023069 -0.04116486 -0.01732045)
    Marker R.Shank.Upper.Ant.Med: tibia_r (0.001778194 -0.04398694 -0.01552403)
    Marker R.Shank.Lower.Post.Med: tibia_r (-0.01854216 -0.06809141 -0.01891449)
    Marker R.Shank.Lower.Ant.Med: tibia_r (0.003802978 -0.07116351 -0.01563458)
    Marker R.Head.Side: ground (-0.09674342 1.641055 0.08359459)
    Marker L.Head.Side: ground (-0.0967434 1.64106 -0.0835946)
    Marker R.Upper.Hum: ground (-0.1052108 1.351647 0.2273011)
    Marker L.Upper.Hum: ground (-0.105211 1.35165 -0.227301)
    Marker R.Elbow.Lat: ground (-0.09178624 1.117041 0.2075192)
    Marker L.Elbow.Lat: ground (-0.0917862 1.11704 -0.207519)
    Marker R.Wrist.Post: ground (-0.1212343 0.8681713 0.1814877)
    Marker L.Wrist.Post: ground (-0.121234 0.868171 -0.181488)
    Marker R.Wrist.Ant: ground (-0.0619102 0.8625866 0.1783718)
    Marker L.Wrist.Ant: ground (-0.0619102 0.862587 -0.178372)
    Marker R.Elbow.Med: ground (-0.0917862 1.11704 0.1211295)
    Marker L.Elbow.Med: ground (-0.0917862 1.11704 -0.121129)
  ContactGeometrySet:
    ContactSphere contactSphere_heel_r_mid: socket_frame=/bodyset/calcn_r location=(0.001307528 -0.0081 0) radius=0.015
    ContactSphere contactSphere_heel_r_lat: socket_frame=/bodyset/calcn_r location=(0.02130753 -0.0081 0.025)
        radius=0.015
    ContactSphere contactSphere_heel_r_med: socket_frame=/bodyset/calcn_r location=(0.02130753 -0.0081 -0.025)
        radius=0.015
    ContactSphere contactSphere_mid_r_mid: socket_frame=/bodyset/calcn_r location=(0.08355376 -0.0081 0.0056)
        radius=0.015
    ContactSphere contactSphere_mid_r_lat: socket_frame=/bodyset/calcn_r location=(0.07215376 -0.0081 0.031)
        radius=0.015
    ContactSphere contactSphere_mid_r_med: socket_frame=/bodyset/calcn_r location=(0.09165376 -0.0081 -0.023)
        radius=0.015
    ContactSphere contactSphere_mh1_r_mid: socket_frame=/bodyset/calcn_r location=(0.182 -0.0081 -0.023) radius=0.015
    ContactSphere contactSphere_mh3_r_mid: socket_frame=/bodyset/calcn_r location=(0.1658 -0.0081 0.0116) radius=0.015
    ContactSphere contactSphere_mh5_r_mid: socket_frame=/bodyset/calcn_r location=(0.143 -0.0081 0.037) radius=0.015
    ContactSphere contactSphere_hallux_r_mid: socket_frame=/bodyset/toes_r location=(0.0574 -0.0082 -0.01918)
        radius=0.015
    ContactSphere contactSphere_othertoes_r_mid: socket_frame=/bodyset/toes_r location=(0.0353 -0.004 0.02312)
        radius=0.015
    ContactSphere contactSphere_heel_l_mid: socket_frame=/bodyset/calcn_l location=(0.001307528 -0.0081 0) radius=0.015
    ContactSphere contactSphere_heel_l_lat: socket_frame=/bodyset/calcn_l location=(0.02130753 -0.0081 -0.025)
        radius=0.015
    ContactSphere contactSphere_heel_l_med: socket_frame=/bodyset/calcn_l location=(0.02130753 -0.0081 0.025)
        radius=0.015
    ContactSphere contactSphere_mid_l_mid: socket_frame=/bodyset/calcn_l location=(0.08355376 -0.0081 -0.0056)
        radius=0.015
    ContactSphere contactSphere_mid_l_lat: socket_frame=/bodyset/calcn_l location=(0.07215376 -0.0081 -0.031)
        radius=0.015
    ContactSphere contactSphere_mid_l_med: socket_frame=/bodyset/calcn_l location=(0.09165376 -0.0081 0.023)
        radius=0.015
    ContactSphere contactSphere_mh1_l_mid: socket_frame=/bodyset/calcn_l location=(0.182 -0.0081 0.023) radius=0.015
    ContactSphere contactSphere_mh3_l_mid: socket_frame=/bodyset/calcn_l location=(0.1658 -0.0081 -0.0116) radius=0.015
    ContactSphere contactSphere_mh5_l_mid: socket_frame=/bodyset/calcn_l location=(0.143 -0.0081 -0.037) radius=0.015
    ContactSphere contactSphere_hallux_l_mid: socket_frame=/bodyset/toes_l location=(0.0574 -0.0082 0.01918)
        radius=0.015
    ContactSphere contactSphere_othertoes_l_mid: socket_frame=/bodyset/toes_l location=(0.0353 -0.004 -0.02312)
        radius=0.015
    ContactHalfSpace floor: socket_frame=/ground orientation=(0 0 -1.570796)
