# OpenSim document version 40500
Model:
  gravity: 0 -9.80665 0
  SliderJoint slider: socket_parent_frame=/ground socket_child_frame=/bodyset/body1
    Coordinate position: range=(-10 10)
  CoordinateActuator actuator: coordinate=position optimal_force=1
  Ground
  BodySet:
    Body body1: mass=1 [kg] inertia=(0 0 0 0 0 0)
      Sphere body1_geom_1: radius=0.05
