# OpenSim document version 40000
Model 3D_gait:
  gravity: 0 -9.81 0
  length_units: meters
  force_units: N
  SmoothSphereHalfSpaceForce [values shared by the 22 below unless stated]: socket_half_space=/contactgeometryset/floor
      stiffness=3067776 [N/m^2] dissipation=2 [s/m] static_friction=0.8 dynamic_friction=0.8 viscous_friction=0.5
      transition_velocity=0.2 [m/s] hertz_smoothing=300 hunt_crossley_smoothing=50
  SmoothSphereHalfSpaceForce contactHeel_r: socket_sphere=/contactgeometryset/heel_r
  SmoothSphereHalfSpaceForce contactLatHeel_r: socket_sphere=/contactgeometryset/latheel_r
  SmoothSphereHalfSpaceForce contactMedHeel_r: socket_sphere=/contactgeometryset/medheel_r
  SmoothSphereHalfSpaceForce contactMid_r: socket_sphere=/contactgeometryset/mid_r
  SmoothSphereHalfSpaceForce contactLatMid_r: socket_sphere=/contactgeometryset/latmid_r
  SmoothSphereHalfSpaceForce contactMedMid_r: socket_sphere=/contactgeometryset/medmid_r
  SmoothSphereHalfSpaceForce contactMH1_r: socket_sphere=/contactgeometryset/mh1_r
  SmoothSphereHalfSpaceForce contactMH3_r: socket_sphere=/contactgeometryset/mh3_r
  SmoothSphereHalfSpaceForce contactMH5_r: socket_sphere=/contactgeometryset/mh5_r
  SmoothSphereHalfSpaceForce contactHallux_r: socket_sphere=/contactgeometryset/hallux_r
  SmoothSphereHalfSpaceForce contactOtherToes_r: socket_sphere=/contactgeometryset/othertoes_r stiffness=306777.6
  SmoothSphereHalfSpaceForce contactHeel_l: socket_sphere=/contactgeometryset/heel_l
  SmoothSphereHalfSpaceForce contactLatHeel_l: socket_sphere=/contactgeometryset/latheel_l
  SmoothSphereHalfSpaceForce contactMedHeel_l: socket_sphere=/contactgeometryset/medheel_l
  SmoothSphereHalfSpaceForce contactMid_l: socket_sphere=/contactgeometryset/mid_l
  SmoothSphereHalfSpaceForce contactLatMid_l: socket_sphere=/contactgeometryset/latmid_l
  SmoothSphereHalfSpaceForce contactMedMid_l: socket_sphere=/contactgeometryset/medmid_l
  SmoothSphereHalfSpaceForce contactMH1_l: socket_sphere=/contactgeometryset/mh1_l
  SmoothSphereHalfSpaceForce contactMH3_l: socket_sphere=/contactgeometryset/mh3_l
  SmoothSphereHalfSpaceForce contactMH5_l: socket_sphere=/contactgeometryset/mh5_l
  SmoothSphereHalfSpaceForce contactHallux_l: socket_sphere=/contactgeometryset/hallux_l
  SmoothSphereHalfSpaceForce contactOtherToes_l: socket_sphere=/contactgeometryset/othertoes_l stiffness=306777.6
  Bhargava2004SmoothedMuscleMetabolics metabolic_cost: use_smoothing=true
    muscle_parameters:
      Bhargava2004SmoothedMuscleMetabolics_MuscleParameters [values shared by the 76 below unless stated]: ratio_slow_twitch_fibers=0.5
          use_provided_muscle_mass=false
      Bhargava2004SmoothedMuscleMetabolics_MuscleParameters addbrev_r: socket_muscle=/forceset/addbrev_r
      Bhargava2004SmoothedMuscleMetabolics_MuscleParameters addlong_r: socket_muscle=/forceset/addlong_r
      Bhargava2004SmoothedMuscleMetabolics_MuscleParameters addmagMid_r: socket_muscle=/forceset/addmagMid_r
      Bhargava2004SmoothedMuscleMetabolics_MuscleParameters bflh_r: socket_muscle=/forceset/bflh_r
      Bhargava2004SmoothedMuscleMetabolics_MuscleParameters bfsh_r: socket_muscle=/forceset/bfsh_r
      Bhargava2004SmoothedMuscleMetabolics_MuscleParameters edl_r: socket_muscle=/forceset/edl_r
      Bhargava2004SmoothedMuscleMetabolics_MuscleParameters ehl_r: socket_muscle=/forceset/ehl_r
      Bhargava2004SmoothedMuscleMetabolics_MuscleParameters fdb_r: socket_muscle=/forceset/fdb_r
      Bhargava2004SmoothedMuscleMetabolics_MuscleParameters fdl_r: socket_muscle=/forceset/fdl_r
      Bhargava2004SmoothedMuscleMetabolics_MuscleParameters fhl_r: socket_muscle=/forceset/fhl_r
      Bhargava2004SmoothedMuscleMetabolics_MuscleParameters gaslat_r: socket_muscle=/forceset/gaslat_r
      Bhargava2004SmoothedMuscleMetabolics_MuscleParameters gasmed_r: socket_muscle=/forceset/gasmed_r
      Bhargava2004SmoothedMuscleMetabolics_MuscleParameters glmax2_r: socket_muscle=/forceset/glmax2_r
      Bhargava2004SmoothedMuscleMetabolics_MuscleParameters glmed2_r: socket_muscle=/forceset/glmed2_r
      Bhargava2004SmoothedMuscleMetabolics_MuscleParameters glmin2_r: socket_muscle=/forceset/glmin2_r
      Bhargava2004SmoothedMuscleMetabolics_MuscleParameters grac_r: socket_muscle=/forceset/grac_r
      Bhargava2004SmoothedMuscleMetabolics_MuscleParameters iliacus_r: socket_muscle=/forceset/iliacus_r
      Bhargava2004SmoothedMuscleMetabolics_MuscleParameters obtext_r: socket_muscle=/forceset/obtext_r
      Bhargava2004SmoothedMuscleMetabolics_MuscleParameters pect_r: socket_muscle=/forceset/pect_r
      Bhargava2004SmoothedMuscleMetabolics_MuscleParameters perbrev_r: socket_muscle=/forceset/perbrev_r
      Bhargava2004SmoothedMuscleMetabolics_MuscleParameters perlong_r: socket_muscle=/forceset/perlong_r
      Bhargava2004SmoothedMuscleMetabolics_MuscleParameters pertert_r: socket_muscle=/forceset/pertert_r
      Bhargava2004SmoothedMuscleMetabolics_MuscleParameters piri_r: socket_muscle=/forceset/piri_r
      Bhargava2004SmoothedMuscleMetabolics_MuscleParameters popli_r: socket_muscle=/forceset/popli_r
      Bhargava2004SmoothedMuscleMetabolics_MuscleParameters psoas_r: socket_muscle=/forceset/psoas_r
      Bhargava2004SmoothedMuscleMetabolics_MuscleParameters quadfem_r: socket_muscle=/forceset/quadfem_r
      Bhargava2004SmoothedMuscleMetabolics_MuscleParameters recfem_r: socket_muscle=/forceset/recfem_r
      Bhargava2004SmoothedMuscleMetabolics_MuscleParameters sart_r: socket_muscle=/forceset/sart_r
      Bhargava2004SmoothedMuscleMetabolics_MuscleParameters semimem_r: socket_muscle=/forceset/semimem_r
      Bhargava2004SmoothedMuscleMetabolics_MuscleParameters semiten_r: socket_muscle=/forceset/semiten_r
      Bhargava2004SmoothedMuscleMetabolics_MuscleParameters soleus_r: socket_muscle=/forceset/soleus_r
      Bhargava2004SmoothedMuscleMetabolics_MuscleParameters tfl_r: socket_muscle=/forceset/tfl_r
      Bhargava2004SmoothedMuscleMetabolics_MuscleParameters tibant_r: socket_muscle=/forceset/tibant_r
      Bhargava2004SmoothedMuscleMetabolics_MuscleParameters tibpost_r: socket_muscle=/forceset/tibpost_r
      Bhargava2004SmoothedMuscleMetabolics_MuscleParameters tricox_r: socket_muscle=/forceset/tricox_r
      Bhargava2004SmoothedMuscleMetabolics_MuscleParameters vasint_r: socket_muscle=/forceset/vasint_r
      Bhargava2004SmoothedMuscleMetabolics_MuscleParameters vaslat_r: socket_muscle=/forceset/vaslat_r
      Bhargava2004SmoothedMuscleMetabolics_MuscleParameters vasmed_r: socket_muscle=/forceset/vasmed_r
      Bhargava2004SmoothedMuscleMetabolics_MuscleParameters addbrev_l: socket_muscle=/forceset/addbrev_l
      Bhargava2004SmoothedMuscleMetabolics_MuscleParameters addlong_l: socket_muscle=/forceset/addlong_l
      Bhargava2004SmoothedMuscleMetabolics_MuscleParameters addmagMid_l: socket_muscle=/forceset/addmagMid_l
      Bhargava2004SmoothedMuscleMetabolics_MuscleParameters bflh_l: socket_muscle=/forceset/bflh_l
      Bhargava2004SmoothedMuscleMetabolics_MuscleParameters bfsh_l: socket_muscle=/forceset/bfsh_l
      Bhargava2004SmoothedMuscleMetabolics_MuscleParameters edl_l: socket_muscle=/forceset/edl_l
      Bhargava2004SmoothedMuscleMetabolics_MuscleParameters ehl_l: socket_muscle=/forceset/ehl_l
      Bhargava2004SmoothedMuscleMetabolics_MuscleParameters fdb_l: socket_muscle=/forceset/fdb_l
      Bhargava2004SmoothedMuscleMetabolics_MuscleParameters fdl_l: socket_muscle=/forceset/fdl_l
      Bhargava2004SmoothedMuscleMetabolics_MuscleParameters fhl_l: socket_muscle=/forceset/fhl_l
      Bhargava2004SmoothedMuscleMetabolics_MuscleParameters gaslat_l: socket_muscle=/forceset/gaslat_l
      Bhargava2004SmoothedMuscleMetabolics_MuscleParameters gasmed_l: socket_muscle=/forceset/gasmed_l
      Bhargava2004SmoothedMuscleMetabolics_MuscleParameters glmax2_l: socket_muscle=/forceset/glmax2_l
      Bhargava2004SmoothedMuscleMetabolics_MuscleParameters glmed2_l: socket_muscle=/forceset/glmed2_l
      Bhargava2004SmoothedMuscleMetabolics_MuscleParameters glmin2_l: socket_muscle=/forceset/glmin2_l
      Bhargava2004SmoothedMuscleMetabolics_MuscleParameters grac_l: socket_muscle=/forceset/grac_l
      Bhargava2004SmoothedMuscleMetabolics_MuscleParameters iliacus_l: socket_muscle=/forceset/iliacus_l
      Bhargava2004SmoothedMuscleMetabolics_MuscleParameters obtext_l: socket_muscle=/forceset/obtext_l
      Bhargava2004SmoothedMuscleMetabolics_MuscleParameters pect_l: socket_muscle=/forceset/pect_l
      Bhargava2004SmoothedMuscleMetabolics_MuscleParameters perbrev_l: socket_muscle=/forceset/perbrev_l
      Bhargava2004SmoothedMuscleMetabolics_MuscleParameters perlong_l: socket_muscle=/forceset/perlong_l
      Bhargava2004SmoothedMuscleMetabolics_MuscleParameters pertert_l: socket_muscle=/forceset/pertert_l
      Bhargava2004SmoothedMuscleMetabolics_MuscleParameters piri_l: socket_muscle=/forceset/piri_l
      Bhargava2004SmoothedMuscleMetabolics_MuscleParameters popli_l: socket_muscle=/forceset/popli_l
      Bhargava2004SmoothedMuscleMetabolics_MuscleParameters psoas_l: socket_muscle=/forceset/psoas_l
      Bhargava2004SmoothedMuscleMetabolics_MuscleParameters quadfem_l: socket_muscle=/forceset/quadfem_l
      Bhargava2004SmoothedMuscleMetabolics_MuscleParameters recfem_l: socket_muscle=/forceset/recfem_l
      Bhargava2004SmoothedMuscleMetabolics_MuscleParameters sart_l: socket_muscle=/forceset/sart_l
      Bhargava2004SmoothedMuscleMetabolics_MuscleParameters semimem_l: socket_muscle=/forceset/semimem_l
      Bhargava2004SmoothedMuscleMetabolics_MuscleParameters semiten_l: socket_muscle=/forceset/semiten_l
      Bhargava2004SmoothedMuscleMetabolics_MuscleParameters soleus_l: socket_muscle=/forceset/soleus_l
      Bhargava2004SmoothedMuscleMetabolics_MuscleParameters tfl_l: socket_muscle=/forceset/tfl_l
      Bhargava2004SmoothedMuscleMetabolics_MuscleParameters tibant_l: socket_muscle=/forceset/tibant_l
      Bhargava2004SmoothedMuscleMetabolics_MuscleParameters tibpost_l: socket_muscle=/forceset/tibpost_l
      Bhargava2004SmoothedMuscleMetabolics_MuscleParameters tricox_l: socket_muscle=/forceset/tricox_l
      Bhargava2004SmoothedMuscleMetabolics_MuscleParameters vasint_l: socket_muscle=/forceset/vasint_l
      Bhargava2004SmoothedMuscleMetabolics_MuscleParameters vaslat_l: socket_muscle=/forceset/vaslat_l
      Bhargava2004SmoothedMuscleMetabolics_MuscleParameters vasmed_l: socket_muscle=/forceset/vasmed_l
  Ground
  BodySet:
    Body pelvis: mass=11.777 [kg] mass_center=(-0.0707 0 0) inertia=(0.1028 0.0871 0.0579 0 0 0)
        meshes=(r_pelvis.vtp l_pelvis.vtp sacrum.vtp)
      WrapCylinder Gmax2_at_pelvis_r: xyz_body_rotation=(-0.75 0.39 0) translation=(-0.08 -0.083 0.068) quadrant=all
          radius=0.04 length=0.1
      WrapCylinder Gmax2_at_pelvis_l: xyz_body_rotation=(0.75 -0.39 0) translation=(-0.08 -0.083 -0.068) quadrant=all
          radius=0.04 length=0.1
      WrapCylinder PS_at_brim_r: xyz_body_rotation=(-0.25 -0.27 0.1) translation=(-0.074 -0.06 0.0656) quadrant=-y
          radius=0.05 length=0.1
      WrapCylinder PS_at_brim_l: xyz_body_rotation=(0.25 0.27 0.1) translation=(-0.074 -0.06 -0.0656) quadrant=-y
          radius=0.05 length=0.1
      WrapCylinder IL_at_brim_r: xyz_body_rotation=(-0.32 -0.24 0.9) translation=(-0.071 -0.065 0.0756) quadrant=-y
          radius=0.0549 length=0.1
      WrapCylinder IL_at_brim_l: xyz_body_rotation=(0.32 0.24 0.9) translation=(-0.071 -0.065 -0.0756) quadrant=-y
          radius=0.0549 length=0.1
    Body femur_l: mass=9.3014 mass_center=(0 -0.17 0) inertia=(0.1339 0.0351 0.1412 0 0 0) meshes=l_femur.vtp
      WrapCylinder GasLat_at_condyles_l: translation=(0.005 -0.41 0) quadrant=all radius=0.026 length=0.1
      WrapCylinder GasMed_at_condyles_l: translation=(0.005 -0.41 0) quadrant=all radius=0.025 length=0.1
      WrapCylinder Popli_at_condyles_l: translation=(0.005 -0.42 0) quadrant=all radius=0.03 length=0.1
      WrapCylinder KnExt_at_fem_l: xyz_body_rotation=(0.0623366 -0.0507601 0)
          translation=(0.00358828 -0.402732 -0.00209111) quadrant=all radius=0.025 length=0.1
      WrapCylinder KnExtVL_at_fem_l: xyz_body_rotation=(0.0623366 -0.0507601 0)
          translation=(0.00188828 -0.402732 -0.00209111) quadrant=all radius=0.025 length=0.1
      WrapCylinder AB_at_femshaft_l: xyz_body_rotation=(-1.66157 -0.186644 0)
          translation=(0.0146434 -0.112595 -0.023365) quadrant=all radius=0.0165 length=0.07
      WrapCylinder AL_at_femshaft_l: xyz_body_rotation=(-1.77711 -0.136489 0)
          translation=(0.0307327 -0.231909 -0.0151137) quadrant=all radius=0.0201 length=0.1
      WrapCylinder AMmid_at_femshaft_l: xyz_body_rotation=(-1.61139 -0.13656 0)
          translation=(0.0230125 -0.160711 -0.0205842) quadrant=all radius=0.0214 length=0.12
    Body femur_r: mass=9.3014 mass_center=(0 -0.17 0) inertia=(0.1339 0.0351 0.1412 0 0 0) meshes=r_femur.vtp
      WrapCylinder GasLat_at_condyles_r: translation=(0.005 -0.41 0) quadrant=all radius=0.026 length=0.1
      WrapCylinder GasMed_at_condyles_r: translation=(0.005 -0.41 0) quadrant=all radius=0.025 length=0.1
      WrapCylinder Popli_at_condyles_r: translation=(0.005 -0.42 0) quadrant=all radius=0.03 length=0.1
      WrapCylinder KnExt_at_fem_r: xyz_body_rotation=(-0.0623366 0.0507601 0)
          translation=(0.00358828 -0.402732 0.00209111) quadrant=all radius=0.025 length=0.1
      WrapCylinder KnExtVL_at_fem_r: xyz_body_rotation=(-0.0623366 0.0507601 0)
          translation=(0.00188828 -0.402732 0.00209111) quadrant=all radius=0.025 length=0.1
      WrapCylinder AB_at_femshaft_r: xyz_body_rotation=(1.66157 0.186644 0) translation=(0.0146434 -0.112595 0.023365)
          quadrant=all radius=0.0165 length=0.07
      WrapCylinder AL_at_femshaft_r: xyz_body_rotation=(1.77711 0.136489 0) translation=(0.0307327 -0.231909 0.0151137)
          quadrant=all radius=0.0201 length=0.1
      WrapCylinder AMmid_at_femshaft_r: xyz_body_rotation=(1.61139 0.13656 0)
          translation=(0.0230125 -0.160711 0.0205842) quadrant=all radius=0.0214 length=0.12
    Body tibia_l: mass=3.7075 mass_center=(0 -0.1867 0) inertia=(0.0504 0.0051 0.0511 0 0 0)
        meshes=(l_tibia.vtp l_fibula.vtp)
      WrapCylinder GasLat_at_shank_l: xyz_body_rotation=(-2.96723 0.279725 -1.47812)
          translation=(-0.0074 -0.074 0.0033) quadrant=-y radius=0.055 length=0.1
      WrapCylinder GasMed_at_shank_l: xyz_body_rotation=(-2.96723 -0.0279725 -1.47812)
          translation=(-0.0074 -0.074 0.0033) quadrant=-y radius=0.059 length=0.1
      WrapCylinder GR_at_condyles_l: xyz_body_rotation=(0 0.4 0) translation=(-0.003 -0.02 0) quadrant=all radius=0.036
          length=0.1
      WrapCylinder SM_at_condyles_l: xyz_body_rotation=(0 0.1 0) translation=(-0.001 -0.02 0) quadrant=all
          radius=0.0345 length=0.1
      WrapCylinder ST_at_condyles_l: xyz_body_rotation=(0 0.2 0) translation=(-0.002 -0.0205 0) quadrant=all
          radius=0.0425 length=0.1
      WrapCylinder BF140_at_gastroc_l: translation=(-0.039 -0.06 0) quadrant=all radius=0.029 length=0.15
    Body tibia_r: mass=3.7075 mass_center=(0 -0.1867 0) inertia=(0.0504 0.0051 0.0511 0 0 0)
        meshes=(r_tibia.vtp r_fibula.vtp)
      WrapCylinder GasLat_at_shank_r: xyz_body_rotation=(2.96723 -0.279725 -1.47812)
          translation=(-0.0074 -0.074 -0.0033) quadrant=-y radius=0.055 length=0.1
      WrapCylinder GasMed_at_shank_r: xyz_body_rotation=(2.96723 0.0279725 -1.47812)
          translation=(-0.0074 -0.074 -0.0033) quadrant=-y radius=0.059 length=0.1
      WrapCylinder GR_at_condyles_r: xyz_body_rotation=(0 -0.4 0) translation=(-0.003 -0.02 0) quadrant=all
          radius=0.036 length=0.1
      WrapCylinder SM_at_condyles_r: xyz_body_rotation=(0 -0.1 0) translation=(-0.001 -0.02 0) quadrant=all
          radius=0.0345 length=0.1
      WrapCylinder ST_at_condyles_r: xyz_body_rotation=(0 -0.2 0) translation=(-0.002 -0.0205 0) quadrant=all
          radius=0.0425 length=0.1
      WrapCylinder BF140_at_gastroc_r: translation=(-0.039 -0.06 0) quadrant=y radius=0.029 length=0.15
    Body patella_l: mass=0.0862 mass_center=(0.0018 0.0264 0) inertia=(2.87e-6 1.311e-5 1.311e-5 0 0 0)
        meshes=l_patella.vtp
    Body patella_r: mass=0.0862 mass_center=(0.0018 0.0264 0) inertia=(2.87e-6 1.311e-5 1.311e-5 0 0 0)
        meshes=r_patella.vtp
    Body talus_l: mass=0.1 mass_center=(0 0 0) inertia=(0.001 0.001 0.001 0 0 0) meshes=l_talus.vtp
    Body talus_r: mass=0.1 mass_center=(0 0 0) inertia=(0.001 0.001 0.001 0 0 0) meshes=r_talus.vtp
    Body calcn_l: mass=1.25 mass_center=(0.1 0.03 0) inertia=(0.0014 0.0039 0.0041 0 0 0) meshes=l_foot.vtp
    Body calcn_r: mass=1.25 mass_center=(0.1 0.03 0) inertia=(0.0014 0.0039 0.0041 0 0 0) meshes=r_foot.vtp
    Body toes_l: mass=0.2166 mass_center=(0.0346 0.006 0.0175) inertia=(0.0001 0.0002 0.001 0 0 0) meshes=l_bofoot.vtp
    Body toes_r: mass=0.2166 mass_center=(0.0346 0.006 0.0175) inertia=(0.0001 0.0002 0.001 0 0 0) meshes=r_bofoot.vtp
    Body torso: mass=26.8266 mass_center=(-0.03 0.32 0) inertia=(1.4745 0.7555 1.4314 0 0 0)
        meshes=(hat_spine.vtp hat_jaw.vtp hat_skull.vtp hat_ribs_scap.vtp)
    Body humerus_r: mass=2.0325 mass_center=(0 -0.164502 0) inertia=(0.011946 0.004121 0.013409 0 0 0)
        meshes=humerus_rv.vtp
    Body ulna_r: mass=0.6075 mass_center=(0 -0.120525 0) inertia=(0.002962 0.000618 0.003213 0 0 0) meshes=ulna_rv.vtp
    Body radius_r: mass=0.6075 mass_center=(0 -0.120525 0) inertia=(0.002962 0.000618 0.003213 0 0 0)
        meshes=radius_rv.vtp
    Body hand_r: mass=0.4575 mass_center=(0 -0.068095 0) inertia=(0.000892 0.000547 0.00134 0 0 0)
        meshes=(pisiform_rvs.vtp lunate_rvs.vtp scaphoid_rvs.vtp triquetrum_rvs.vtp hamate_rvs.vtp capitate_rvs.vtp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)
    Body humerus_l: mass=2.0325 mass_center=(0 -0.164502 0) inertia=(0.011946 0.004121 0.013409 0 0 0)
        meshes=humerus_lv.vtp
    Body ulna_l: mass=0.6075 mass_center=(0 -0.120525 0) inertia=(0.002962 0.000618 0.003213 0 0 0) meshes=ulna_lv.vtp
    Body radius_l: mass=0.6075 mass_center=(0 -0.120525 0) inertia=(0.002962 0.000618 0.003213 0 0 0)
        meshes=radius_lv.vtp
    Body hand_l: mass=0.4575 mass_center=(0 -0.068095 0) inertia=(0.000892 0.000547 0.00134 0 0 0)
        meshes=(pisiform_lvs.vtp lunate_lvs.vtp scaphoid_lvs.vtp triquetrum_lvs.vtp hamate_lvs.vtp capitate_lvs.vtp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)
  JointSet:
    CustomJoint groundPelvis: socket_parent_frame=ground_offset socket_child_frame=pelvis_offset
      Coordinate pelvis_tilt: range=(-1.570796 1.570796)
      Coordinate pelvis_list: range=(-1.570796 1.570796)
      Coordinate pelvis_rotation: range=(-1.570796 1.570796)
      Coordinate pelvis_tx: range=(-5 5)
      Coordinate pelvis_ty: default_value=0.94 range=(-3 3)
      Coordinate pelvis_tz: default_value=0 range=(-3 3)
      PhysicalOffsetFrame ground_offset: socket_parent=/ground translation=(0 0 0) [meters]
      PhysicalOffsetFrame pelvis_offset: socket_parent=/bodyset/pelvis translation=(0 0 0)
      SpatialTransform:
        TransformAxis rotation1: coordinates=pelvis_tilt axis=(0 0 1) LinearFunction(coefficients=1 0)
        TransformAxis rotation2: coordinates=pelvis_list axis=(1 0 0) LinearFunction(coefficients=1 0)
        TransformAxis rotation3: coordinates=pelvis_rotation axis=(0 1 0) LinearFunction(coefficients=1 0)
        TransformAxis translation1: coordinates=pelvis_tx axis=(1 0 0) LinearFunction(coefficients=1 0)
        TransformAxis translation2: coordinates=pelvis_ty axis=(0 1 0) LinearFunction(coefficients=1 0)
        TransformAxis translation3: coordinates=pelvis_tz axis=(0 0 1) LinearFunction(coefficients=1 0)
    CustomJoint hip_l: socket_parent_frame=pelvis_offset socket_child_frame=femur_l_offset
      Coordinate hip_flexion_l: default_value=0 range=(-0.5235988 2.094395)
      Coordinate hip_adduction_l: range=(-0.8726646 0.5235988)
      Coordinate hip_rotation_l: range=(-0.6981317 0.6981317)
      PhysicalOffsetFrame pelvis_offset: socket_parent=/bodyset/pelvis translation=(-0.056276 -0.07849 -0.07726)
      PhysicalOffsetFrame femur_l_offset: socket_parent=/bodyset/femur_l translation=(0 0 0)
      SpatialTransform: axes_held_at_zero=(translation1 translation2 translation3)
        TransformAxis rotation1: coordinates=hip_flexion_l axis=(0 0 1) LinearFunction(coefficients=1 0)
        TransformAxis rotation2: coordinates=hip_adduction_l axis=(1 0 0) LinearFunction(coefficients=-1 0)
        TransformAxis rotation3: coordinates=hip_rotation_l axis=(0 1 0) LinearFunction(coefficients=-1 0)
    CustomJoint hip_r: socket_parent_frame=pelvis_offset socket_child_frame=femur_r_offset
      Coordinate hip_flexion_r: default_value=0 range=(-0.5235988 2.094395)
      Coordinate hip_adduction_r: range=(-0.8726646 0.5235988)
      Coordinate hip_rotation_r: range=(-0.6981317 0.6981317)
      PhysicalOffsetFrame pelvis_offset: socket_parent=/bodyset/pelvis translation=(-0.056276 -0.07849 0.07726)
      PhysicalOffsetFrame femur_r_offset: socket_parent=/bodyset/femur_r translation=(0 0 0)
      SpatialTransform: axes_held_at_zero=(translation1 translation2 translation3)
        TransformAxis rotation1: coordinates=hip_flexion_r axis=(0 0 1) LinearFunction(coefficients=1 0)
        TransformAxis rotation2: coordinates=hip_adduction_r axis=(1 0 0) LinearFunction(coefficients=1 0)
        TransformAxis rotation3: coordinates=hip_rotation_r axis=(0 1 0) LinearFunction(coefficients=1 0)
    CustomJoint patellofemoral_l: socket_parent_frame=tibia_l_offset socket_child_frame=patella_l_offset
      Coordinate knee_angle_l_beta
      PhysicalOffsetFrame tibia_l_offset: socket_parent=/bodyset/femur_l translation=(-0.00809 -0.40796 0.00275)
      PhysicalOffsetFrame patella_l_offset: socket_parent=/bodyset/patella_l translation=(0 0 0)
      SpatialTransform: axes_held_at_zero=(rotation2 rotation3)
        TransformAxis rotation1: coordinates=knee_angle_l_beta axis=(0 0 1)
          SimmSpline: x=(0 0.174533 0.349066 0.523599 0.698132 0.872665 1.0472 1.22173 1.39626 1.5708 1.74533 1.91986 2.0944)
              y=(0.00113686 -0.00629212 -0.105582 -0.253683 -0.414245 -0.579047 -0.747244 -0.91799 -1.09044 -1.26379 -1.43763 -1.61186 -1.78634)
        TransformAxis translation1: coordinates=knee_angle_l_beta axis=(1 0 0)
          SimmSpline: x=(0 0.174533 0.349066 0.523599 0.698132 0.872665 1.0472 1.22173 1.39626 1.5708 1.74533 1.91986 2.0944)
              y=(0.0524 0.0488 0.0437 0.0371 0.0296 0.0216 0.0136 0.0057 -0.0019 -0.0088 -0.0148 -0.0196 -0.0227)
        TransformAxis translation2: coordinates=knee_angle_l_beta axis=(0 1 0)
          SimmSpline: x=(0 0.174533 0.349066 0.523599 0.698132 0.872665 1.0472 1.22173 1.39626 1.5708 1.74533 1.91986 2.0944)
              y=(-0.0108 -0.019 -0.0263 -0.0322 -0.0367 -0.0395 -0.0408 -0.0404 -0.0384 -0.0349 -0.0301 -0.0245 -0.0187)
        TransformAxis translation3: axis=(0 0 1) Constant(value=-0.00275)
    CustomJoint patellofemoral_r: socket_parent_frame=tibia_r_offset socket_child_frame=patella_r_offset
      Coordinate knee_angle_r_beta
      PhysicalOffsetFrame tibia_r_offset: socket_parent=/bodyset/femur_r translation=(-0.00809 -0.40796 -0.00275)
      PhysicalOffsetFrame patella_r_offset: socket_parent=/bodyset/patella_r translation=(0 0 0)
      SpatialTransform: axes_held_at_zero=(rotation2 rotation3)
        TransformAxis rotation1: coordinates=knee_angle_r_beta axis=(0 0 1)
          SimmSpline: x=(0 0.174533 0.349066 0.523599 0.698132 0.872665 1.0472 1.22173 1.39626 1.5708 1.74533 1.91986 2.0944)
              y=(0.00113686 -0.00629212 -0.105582 -0.253683 -0.414245 -0.579047 -0.747244 -0.91799 -1.09044 -1.26379 -1.43763 -1.61186 -1.78634)
        TransformAxis translation1: coordinates=knee_angle_r_beta axis=(1 0 0)
          SimmSpline: x=(0 0.174533 0.349066 0.523599 0.698132 0.872665 1.0472 1.22173 1.39626 1.5708 1.74533 1.91986 2.0944)
              y=(0.0524 0.0488 0.0437 0.0371 0.0296 0.0216 0.0136 0.0057 -0.0019 -0.0088 -0.0148 -0.0196 -0.0227)
        TransformAxis translation2: coordinates=knee_angle_r_beta axis=(0 1 0)
          SimmSpline: x=(0 0.174533 0.349066 0.523599 0.698132 0.872665 1.0472 1.22173 1.39626 1.5708 1.74533 1.91986 2.0944)
              y=(-0.0108 -0.019 -0.0263 -0.0322 -0.0367 -0.0395 -0.0408 -0.0404 -0.0384 -0.0349 -0.0301 -0.0245 -0.0187)
        TransformAxis translation3: axis=(0 0 1) Constant(value=0.00275)
    PinJoint knee_l: socket_parent_frame=femur_l_offset socket_child_frame=tibia_l_offset
      Coordinate knee_angle_l: default_value=0 range=(-2.094395 0)
      PhysicalOffsetFrame femur_l_offset: socket_parent=/bodyset/femur_l translation=(0 -0.40796 0.00275)
      PhysicalOffsetFrame tibia_l_offset: socket_parent=/bodyset/tibia_l translation=(0 0 0)
    PinJoint knee_r: socket_parent_frame=femur_r_offset socket_child_frame=tibia_r_offset
      Coordinate knee_angle_r: default_value=0 range=(-2.094395 0)
      PhysicalOffsetFrame femur_r_offset: socket_parent=/bodyset/femur_r translation=(0 -0.40796 -0.00275)
      PhysicalOffsetFrame tibia_r_offset: socket_parent=/bodyset/tibia_r translation=(0 0 0)
    PinJoint ankle_l: socket_parent_frame=tibia_l_offset socket_child_frame=talus_l_offset
      Coordinate ankle_angle_l: range=(-0.6981317 0.5235988)
      PhysicalOffsetFrame tibia_l_offset: socket_parent=/bodyset/tibia_l translation=(-0.01 -0.4 0)
          orientation=(-0.1758952 0.105208 0.01866219) [radians]
      PhysicalOffsetFrame talus_l_offset: socket_parent=/bodyset/talus_l translation=(0 0 0)
          orientation=(-0.1758952 0.105208 0.01866219)
    PinJoint ankle_r: socket_parent_frame=tibia_r_offset socket_child_frame=talus_r_offset
      Coordinate ankle_angle_r: range=(-0.6981317 0.5235988)
      PhysicalOffsetFrame tibia_r_offset: socket_parent=/bodyset/tibia_r translation=(-0.01 -0.4 0)
          orientation=(0.1758952 -0.105208 0.01866219)
      PhysicalOffsetFrame talus_r_offset: socket_parent=/bodyset/talus_r translation=(0 0 0)
          orientation=(0.1758952 -0.105208 0.01866219)
    CustomJoint lumbar: socket_parent_frame=pelvis_offset socket_child_frame=torso_offset
      Coordinate lumbar_flex: range=(-1.570796 1.570796)
      Coordinate lumbar_add: range=(-1.570796 1.570796)
      Coordinate lumbar_rot: range=(-1.570796 1.570796)
      PhysicalOffsetFrame pelvis_offset: socket_parent=/bodyset/pelvis translation=(-0.1007 0.0815 0)
      PhysicalOffsetFrame torso_offset: socket_parent=/bodyset/torso translation=(0 0 0)
      SpatialTransform: axes_held_at_zero=(translation1 translation2 translation3)
        TransformAxis rotation1: coordinates=lumbar_flex axis=(0 0 1) LinearFunction(coefficients=1 0)
        TransformAxis rotation2: coordinates=lumbar_add axis=(1 0 0) LinearFunction(coefficients=1 0)
        TransformAxis rotation3: coordinates=lumbar_rot axis=(0 1 0) LinearFunction(coefficients=1 0)
    WeldJoint shoulder_r: socket_parent_frame=torso_offset socket_child_frame=humerus_r_offset
      PhysicalOffsetFrame torso_offset: socket_parent=/bodyset/torso translation=(0.003155 0.3715 0.17)
      PhysicalOffsetFrame humerus_r_offset: socket_parent=/bodyset/humerus_r translation=(0 0 0)
    WeldJoint shoulder_l: socket_parent_frame=torso_offset socket_child_frame=humerus_l_offset
      PhysicalOffsetFrame torso_offset: socket_parent=/bodyset/torso translation=(0.003155 0.3715 -0.17)
      PhysicalOffsetFrame humerus_l_offset: socket_parent=/bodyset/humerus_l translation=(0 0 0)
    WeldJoint elbow_r: socket_parent_frame=humerus_r_offset socket_child_frame=ulna_r_offset
      PhysicalOffsetFrame humerus_r_offset: socket_parent=/bodyset/humerus_r translation=(0.013144 -0.286273 -0.009595)
          orientation=(-0.02286271 0.2280177 0.005168901)
      PhysicalOffsetFrame ulna_r_offset: socket_parent=/bodyset/ulna_r translation=(0 0 0)
          orientation=(-0.02286271 0.2280177 0.005168901)
    WeldJoint elbow_l: socket_parent_frame=humerus_l_offset socket_child_frame=ulna_l_offset
      PhysicalOffsetFrame humerus_l_offset: socket_parent=/bodyset/humerus_l translation=(0.013144 -0.286273 0.009595)
          orientation=(0.02286271 -0.2280177 0.005168901)
      PhysicalOffsetFrame ulna_l_offset: socket_parent=/bodyset/ulna_l translation=(0 0 0)
          orientation=(0.02286271 -0.2280177 0.005168901)
    WeldJoint radioulnar_r: socket_parent_frame=ulna_r_offset socket_child_frame=radius_r_offset
      PhysicalOffsetFrame ulna_r_offset: socket_parent=/bodyset/ulna_r translation=(-0.006727 -0.013007 0.026083)
          orientation=(-1.568841 0.05642797 1.536144)
      PhysicalOffsetFrame radius_r_offset: socket_parent=/bodyset/radius_r translation=(0 0 0)
          orientation=(-1.568841 0.05642797 -0.0346525)
    WeldJoint radioulnar_l: socket_parent_frame=ulna_l_offset socket_child_frame=radius_l_offset
      PhysicalOffsetFrame ulna_l_offset: socket_parent=/bodyset/ulna_l translation=(-0.006727 -0.013007 -0.026083)
          orientation=(1.568841 -0.05642797 1.536144)
      PhysicalOffsetFrame radius_l_offset: socket_parent=/bodyset/radius_l translation=(0 0 0)
          orientation=(1.568841 -0.05642797 -0.0346525)
    WeldJoint wrist_r: socket_parent_frame=radius_r_offset socket_child_frame=hand_r_offset
      PhysicalOffsetFrame radius_r_offset: socket_parent=/bodyset/radius_r translation=(-0.008797 -0.235841 0.01361)
      PhysicalOffsetFrame hand_r_offset: socket_parent=/bodyset/hand_r translation=(0 0 0)
    WeldJoint wrist_l: socket_parent_frame=radius_l_offset socket_child_frame=hand_l_offset
      PhysicalOffsetFrame radius_l_offset: socket_parent=/bodyset/radius_l translation=(-0.008797 -0.235841 -0.01361)
      PhysicalOffsetFrame hand_l_offset: socket_parent=/bodyset/hand_l translation=(0 0 0)
    WeldJoint mtp_r: socket_parent_frame=calcn_r_offset socket_child_frame=toes_r_offset
      PhysicalOffsetFrame calcn_r_offset: socket_parent=/bodyset/calcn_r translation=(0.1788 -0.002 0.00108)
          orientation=(0 -0.6199005 0)
      PhysicalOffsetFrame toes_r_offset: socket_parent=/bodyset/toes_r translation=(0 0 0) orientation=(0 -0.6199005 0)
    WeldJoint mtp_l: socket_parent_frame=calcn_l_offset socket_child_frame=toes_l_offset
      PhysicalOffsetFrame calcn_l_offset: socket_parent=/bodyset/calcn_l translation=(0.1788 -0.002 -0.00108)
          orientation=(0 0.6199005 0)
      PhysicalOffsetFrame toes_l_offset: socket_parent=/bodyset/toes_l translation=(0 0 0) orientation=(0 0.6199005 0)
    WeldJoint subtalar_r: socket_parent_frame=talus_r_offset socket_child_frame=calcn_r_offset
      PhysicalOffsetFrame talus_r_offset: socket_parent=/bodyset/talus_r translation=(-0.04877 -0.04195 0.00792)
          orientation=(-1.768191 0.906223 1.819602)
      PhysicalOffsetFrame calcn_r_offset: socket_parent=/bodyset/calcn_r translation=(0 0 0)
          orientation=(-1.768191 0.906223 1.819602)
    WeldJoint subtalar_l: socket_parent_frame=talus_l_offset socket_child_frame=calcn_l_offset
      PhysicalOffsetFrame talus_l_offset: socket_parent=/bodyset/talus_l translation=(-0.04877 -0.04195 -0.00792)
          orientation=(1.768191 -0.906223 1.819602)
      PhysicalOffsetFrame calcn_l_offset: socket_parent=/bodyset/calcn_l translation=(0 0 0)
          orientation=(1.768191 -0.906223 1.819602)
  ConstraintSet:
    CoordinateCouplerConstraint patellofemoral_knee_angle_r_con: independent_coordinate_names=knee_angle_r
        dependent_coordinate_name=knee_angle_r_beta scale_factor=1
        coupled_coordinates_function=LinearFunction(coefficients=-1 0)
    CoordinateCouplerConstraint patellofemoral_knee_angle_l_con: independent_coordinate_names=knee_angle_l
        dependent_coordinate_name=knee_angle_l_beta scale_factor=1
        coupled_coordinates_function=LinearFunction(coefficients=-1 0)
  ForceSet:
    ExpressionBasedCoordinateForce PassiveHipDampingX_r: coordinate=hip_flexion_r
        expression=-2.44*exp(5.05*(q-1.81))+1.51*exp(-21.88*(q+0.47))-0.1*qdot
    ExpressionBasedCoordinateForce PassiveHipDampingY_r: coordinate=hip_adduction_r
        expression=-0.03*exp(14.94*(q-0.50))+0.03*exp(-14.94*(q+0.50))-0.1*qdot
    ExpressionBasedCoordinateForce PassiveHipDampingZ_r: coordinate=hip_rotation_r
        expression=-0.03*exp(14.94*(q-0.92))+0.03*exp(-14.94*(q+0.92))-0.1*qdot
    ExpressionBasedCoordinateForce PassiveHipDampingX_l: coordinate=hip_flexion_l
        expression=-2.44*exp(5.05*(q-1.81))+1.51*exp(-21.88*(q+0.47))-0.1*qdot
    ExpressionBasedCoordinateForce PassiveHipDampingY_l: coordinate=hip_adduction_l
        expression=-0.03*exp(14.94*(q-0.50))+0.03*exp(-14.94*(q+0.50))-0.1*qdot
    ExpressionBasedCoordinateForce PassiveHipDampingZ_l: coordinate=hip_rotation_l
        expression=-0.03*exp(14.94*(q-0.92))+0.03*exp(-14.94*(q+0.92))-0.1*qdot
    ExpressionBasedCoordinateForce PassiveKneeDamping_r: coordinate=knee_angle_r
        expression=-6.09*exp(33.94*(q-0.13))+11.03*exp(-11.33*(q+2.40))-0.1*qdot
    ExpressionBasedCoordinateForce PassiveKneeDamping_l: coordinate=knee_angle_l
        expression=-6.09*exp(33.94*(q-0.13))+11.03*exp(-11.33*(q+2.40))-0.1*qdot
    ExpressionBasedCoordinateForce PassiveAnkleDamping_r: coordinate=ankle_angle_r
        expression=-2.03*exp(38.11*(q-0.52))+0.18*exp(-42.12*(q+0.74))-0.1*qdot
    ExpressionBasedCoordinateForce PassiveAnkleDamping_l: coordinate=ankle_angle_l
        expression=-2.03*exp(38.11*(q-0.52))+0.18*exp(-42.12*(q+0.74))-0.1*qdot
    ExpressionBasedCoordinateForce PassiveLumbarDampingX: coordinate=lumbar_flex
        expression=-0.35*exp(30.72*(q-0.17))+0.25*exp(-20.36*(q+0.35))-0.1*qdot
    ExpressionBasedCoordinateForce PassiveLumbarDampingY: coordinate=lumbar_add
        expression=-0.25*exp(20.36*(q-0.17))+0.25*exp(-20.36*(q+0.17))-0.1*qdot
    ExpressionBasedCoordinateForce PassiveLumbarDampingZ: coordinate=lumbar_rot
        expression=-0.25*exp(20.36*(q-0.17))+0.25*exp(-20.36*(q+0.17))-0.1*qdot
    DeGrooteFregly2016Muscle [values shared by the 76 below unless stated]: min_control=0.001 max_control=1
        max_contraction_velocity=12 ignore_tendon_compliance=true default_activation=0.01 active_force_width_scale=1
        fiber_damping=0.01 passive_fiber_strain_at_one_norm_force=0.7 tendon_strain_at_one_norm_force=0.049
        ignore_passive_fiber_force=false
    DeGrooteFregly2016Muscle addbrev_r: max_isometric_force=626 optimal_fiber_length=0.1031 tendon_slack_length=0.0355
        pennation_angle_at_optimal=0.1148 [radians] activation_time_constant=0.016 deactivation_time_constant=0.057
      PathPoint P1: pelvis (-0.0191 -0.094 0.0154)
      PathPoint P2: femur_r (-0.002 -0.118 0.0249)
      PathWrap: wrap_object=AB_at_femshaft_r method=hybrid
    DeGrooteFregly2016Muscle addlong_r: max_isometric_force=917 optimal_fiber_length=0.1082 tendon_slack_length=0.1318
        pennation_angle_at_optimal=0.1378 activation_time_constant=0.018 deactivation_time_constant=0.062
      PathPoint P1: pelvis (-0.00758 -0.0889 0.01888)
      PathPoint P2: femur_r (0.01126 -0.23937 0.01583)
      PathWrap: wrap_object=AL_at_femshaft_r method=hybrid
    DeGrooteFregly2016Muscle addmagMid_r: max_isometric_force=2389 optimal_fiber_length=0.1377
        tendon_slack_length=0.0466 pennation_angle_at_optimal=0.2073 activation_time_constant=0.05
        deactivation_time_constant=0.142
      PathPoint P1: pelvis (-0.05266 -0.12075 0.02854)
      PathPoint P2: femur_r (0.00242 -0.1624 0.02922)
      PathWrap: wrap_object=AMmid_at_femshaft_r method=hybrid
    DeGrooteFregly2016Muscle bflh_r: max_isometric_force=1313 optimal_fiber_length=0.0976 tendon_slack_length=0.3325
        pennation_angle_at_optimal=0.1759182 activation_time_constant=0.027 deactivation_time_constant=0.084
        active_force_width_scale=1.5
      PathPoint P1: pelvis (-0.104 -0.1191 0.0586)
      PathPoint P2: tibia_r (-0.03436 -0.03648 0.03618)
      PathPoint P3: tibia_r (-0.02704 -0.05008 0.03476)
    DeGrooteFregly2016Muscle bfsh_r: max_isometric_force=557 optimal_fiber_length=0.1103 tendon_slack_length=0.1058
        pennation_angle_at_optimal=0.2642 activation_time_constant=0.012 deactivation_time_constant=0.048
      PathPoint P1: femur_r (0.005 -0.2111 0.0234)
      PathPoint P2: tibia_r (-0.02866 -0.03284 0.03204)
      PathWrap: wrap_object=BF140_at_gastroc_r method=hybrid
    DeGrooteFregly2016Muscle edl_r: max_isometric_force=603 optimal_fiber_length=0.0693 tendon_slack_length=0.3689
        pennation_angle_at_optimal=0.2183 activation_time_constant=0.009 deactivation_time_constant=0.041
        active_force_width_scale=1.5
      PathPoint P1: tibia_r (-0.016 -0.1157 0.0205)
      PathPoint P2: tibia_r (0.0164 -0.376 0.0112)
      PathPoint P3: calcn_r (0.0919 0.036 0.0008)
      PathPoint P4: calcn_r (0.1616 0.0055 0.013)
      PathPoint P5: toes_r (0.0003 0.0047 0.0153)
      PathPoint P6: toes_r (0.0443 -0.0004 0.025)
    DeGrooteFregly2016Muscle ehl_r: max_isometric_force=286 optimal_fiber_length=0.0748 tendon_slack_length=0.3268
        pennation_angle_at_optimal=0.1972681 activation_time_constant=0.01 deactivation_time_constant=0.043
        active_force_width_scale=1.5
      PathPoint P1: tibia_r (-0.014 -0.155 0.0189)
      PathPoint P2: tibia_r (0.0071 -0.2909 0.0164)
      PathPoint P3: tibia_r (0.02 -0.3693 -0.0028)
      PathPoint P4: calcn_r (0.097 0.0389 -0.0211)
      PathPoint P5: calcn_r (0.1293 0.0309 -0.0257)
      PathPoint P6: calcn_r (0.1734 0.0139 -0.028)
      PathPoint P7: toes_r (0.0298 0.0041 -0.0245)
      PathPoint P8: toes_r (0.0563 0.0034 -0.0186)
    DeGrooteFregly2016Muscle fdb_r: max_isometric_force=938 optimal_fiber_length=0.0299 tendon_slack_length=0.1693
        pennation_angle_at_optimal=0 activation_time_constant=0.007 deactivation_time_constant=0.036
      PathPoint P1: calcn_r (0.0213 0.0054 0)
      PathPoint P2: calcn_r (0.1658 -0.0081 0.0116)
      PathPoint P3: toes_r (-0.0019 -0.0078 0.0147)
      PathPoint P4: toes_r (0.0285 -0.0071 0.0215)
      PathPoint P5: toes_r (0.0441 -0.006 0.0242)
    DeGrooteFregly2016Muscle fdl_r: max_isometric_force=423 optimal_fiber_length=0.0446 tendon_slack_length=0.3788
        pennation_angle_at_optimal=0.2248 activation_time_constant=0.007 deactivation_time_constant=0.035
        active_force_width_scale=1.5
      PathPoint P1: tibia_r (-0.0023 -0.1832 -0.0018)
      PathPoint P2: tibia_r (-0.0176 -0.3645 -0.0124)
      PathPoint P3: calcn_r (0.0436 0.0315 -0.028)
      PathPoint P4: calcn_r (0.0708 0.0176 -0.0263)
      PathPoint P5: calcn_r (0.1658 -0.0081 0.0116)
      PathPoint P6: toes_r (-0.0019 -0.0078 0.0147)
      PathPoint P7: toes_r (0.0285 -0.0071 0.0215)
      PathPoint P8: toes_r (0.0441 -0.006 0.0242)
    DeGrooteFregly2016Muscle fhl_r: max_isometric_force=908 optimal_fiber_length=0.0527 tendon_slack_length=0.3543
        pennation_angle_at_optimal=0.258 activation_time_constant=0.01 deactivation_time_constant=0.042
        active_force_width_scale=1.5
      PathPoint P1: tibia_r (-0.031 -0.2163 0.02)
      PathPoint P2: tibia_r (-0.0242 -0.3671 -0.0076)
      PathPoint P3: calcn_r (0.0374 0.0276 -0.0241)
      PathPoint P4: calcn_r (0.1038 0.0068 -0.0256)
      PathPoint P5: calcn_r (0.1726 -0.0053 -0.0269)
      PathPoint P6: toes_r (0.0155 -0.0064 -0.0265)
      PathPoint P7: toes_r (0.0562 -0.0102 -0.0181)
    DeGrooteFregly2016Muscle gaslat_r: max_isometric_force=1575 optimal_fiber_length=0.069 tendon_slack_length=0.374
        pennation_angle_at_optimal=0.2102 activation_time_constant=0.016 deactivation_time_constant=0.058
        active_force_width_scale=1.5
      PathPoint P1: femur_r (0.002 -0.381 0.02059)
      PathPoint P2: calcn_r (0.0044 0.031 -0.0053)
      PathWrap gaslat1: wrap_object=GasLat_at_shank_r method=hybrid
      PathWrap gaslat2: wrap_object=GasLat_at_condyles_r method=hybrid
    DeGrooteFregly2016Muscle gasmed_r: max_isometric_force=3116 optimal_fiber_length=0.059 tendon_slack_length=0.387
        pennation_angle_at_optimal=0.1656816 activation_time_constant=0.023 deactivation_time_constant=0.074
        active_force_width_scale=1.5
      PathPoint P1: femur_r (0.006 -0.385 -0.022)
      PathPoint P2: calcn_r (0.0044 0.031 -0.0053)
      PathWrap gasmed1: wrap_object=GasMed_at_shank_r method=hybrid
      PathWrap gasmed2: wrap_object=GasMed_at_condyles_r method=hybrid
    DeGrooteFregly2016Muscle glmax2_r: max_isometric_force=3338 optimal_fiber_length=0.157 tendon_slack_length=0.109
        pennation_angle_at_optimal=0.3673821 activation_time_constant=0.103 deactivation_time_constant=0.274
      PathPoint P1: pelvis (-0.1317 0.0087 0.0462)
      PathPoint P2: pelvis (-0.1344 -0.0609 0.0813)
      PathPoint P3: femur_r (-0.045 -0.0584 0.0252)
      PathPoint P4: femur_r (-0.0156 -0.1016 0.0419)
      PathWrap: wrap_object=Gmax2_at_pelvis_r method=hybrid
    DeGrooteFregly2016Muscle glmed2_r: max_isometric_force=2729 optimal_fiber_length=0.073 tendon_slack_length=0.0652
        pennation_angle_at_optimal=0.3165559 activation_time_constant=0.055 deactivation_time_constant=0.156
      PathPoint P1: pelvis (-0.085 0.0316 0.0675)
      PathPoint P2: femur_r (-0.0258 -0.0058 0.0527)
    DeGrooteFregly2016Muscle glmin2_r: max_isometric_force=1216 optimal_fiber_length=0.056 tendon_slack_length=0.0261
        pennation_angle_at_optimal=0 activation_time_constant=0.014 deactivation_time_constant=0.054
      PathPoint P1: pelvis (-0.0616 -0.0142 0.0971)
      PathPoint P2: femur_r (-0.0096 -0.0104 0.056)
    DeGrooteFregly2016Muscle grac_r: max_isometric_force=281 optimal_fiber_length=0.2278 tendon_slack_length=0.172
        pennation_angle_at_optimal=0.172 activation_time_constant=0.016 deactivation_time_constant=0.057
      PathPoint P1: pelvis (-0.04736 -0.12932 0.02456)
      PathPoint P2: tibia_r (-0.01842 -0.04755 -0.02961)
      PathPoint P3: tibia_r (0.00178 -0.06962 -0.01573)
      PathWrap: wrap_object=GR_at_condyles_r method=hybrid
    DeGrooteFregly2016Muscle iliacus_r: max_isometric_force=1021 optimal_fiber_length=0.1066 tendon_slack_length=0.0961
        pennation_angle_at_optimal=0.2799 activation_time_constant=0.021 deactivation_time_constant=0.07
      PathPoint P1: pelvis (-0.0605 0.0309 0.0843)
      PathPoint P2: pelvis (-0.0135 -0.0557 0.0756)
      PathPoint P3: femur_r (-0.0023 -0.0565 0.0139)
      PathPoint P4: femur_r (-0.0122 -0.0637 0.0196)
      PathWrap: wrap_object=IL_at_brim_r method=hybrid range=(2 3)
    DeGrooteFregly2016Muscle obtext_r: max_isometric_force=109 optimal_fiber_length=0.0492 tendon_slack_length=0.0402
        pennation_angle_at_optimal=0.1222 activation_time_constant=0.006 deactivation_time_constant=0.032
      PathPoint P1: pelvis (-0.085 -0.1151 0.037)
      PathPoint P2: femur_r (-0.035 -0.032 0.041)
    DeGrooteFregly2016Muscle pect_r: max_isometric_force=266 optimal_fiber_length=0.08 tendon_slack_length=0.033
        pennation_angle_at_optimal=0 activation_time_constant=0.008 deactivation_time_constant=0.037
      PathPoint P1: pelvis (-0.0431 -0.0768 0.0451)
      PathPoint P2: femur_r (-0.0122 -0.0822 0.0253)
    DeGrooteFregly2016Muscle perbrev_r: max_isometric_force=521 optimal_fiber_length=0.0454 tendon_slack_length=0.1475
        pennation_angle_at_optimal=0.2052 activation_time_constant=0.008 deactivation_time_constant=0.038
      PathPoint P1: tibia_r (-0.0243 -0.2532 0.0251)
      PathPoint P2: tibia_r (-0.0339 -0.3893 0.0249)
      PathPoint P3: tibia_r (-0.0285 -0.4004 0.0255)
      PathPoint P4: calcn_r (0.0471 0.027 0.0233)
      PathPoint P5: calcn_r (0.0677 0.0219 0.0343)
    DeGrooteFregly2016Muscle perlong_r: max_isometric_force=1115 optimal_fiber_length=0.0508 tendon_slack_length=0.3322
        pennation_angle_at_optimal=0.248 activation_time_constant=0.016 deactivation_time_constant=0.058
      PathPoint P1: tibia_r (-0.02 -0.1373 0.0282)
      PathPoint P2: tibia_r (-0.0317 -0.39 0.0237)
      PathPoint P3: tibia_r (-0.0272 -0.4014 0.024)
      PathPoint P4: calcn_r (0.0438 0.023 0.0221)
      PathPoint P5: calcn_r (0.0681 0.0106 0.0284)
      PathPoint P6: calcn_r (0.0852 0.0069 0.0118)
      PathPoint P7: calcn_r (0.1203 0.0085 -0.0184)
    DeGrooteFregly2016Muscle pertert_r: max_isometric_force=180 optimal_fiber_length=0.0709 tendon_slack_length=0.08
        pennation_angle_at_optimal=0.2269 activation_time_constant=0.007 deactivation_time_constant=0.034
      PathPoint per_tert_r-P1: tibia_r (0.001 -0.2804 0.0231)
      PathPoint per_tert_r-P2: tibia_r (0.0229 -0.3919 0.0259)
      PathPoint per_tert_r-P3: calcn_r (0.0857 0.0228 0.0299)
    DeGrooteFregly2016Muscle piri_r: max_isometric_force=1030 optimal_fiber_length=0.026 tendon_slack_length=0.1149
        pennation_angle_at_optimal=0.1745 activation_time_constant=0.012 deactivation_time_constant=0.046
      PathPoint P1: pelvis (-0.10181 -0.00653 0.01351)
      PathPoint P2: pelvis (-0.10202 -0.03066 0.06092)
      PathPoint P3: femur_r (-0.0148 -0.0036 0.0437)
    DeGrooteFregly2016Muscle popli_r: max_isometric_force=344 optimal_fiber_length=0.041 tendon_slack_length=0.07
        pennation_angle_at_optimal=0 activation_time_constant=0.009 deactivation_time_constant=0.04
      PathPoint P1: femur_r (-0.01 -0.39 0.035)
      PathPoint P2: tibia_r (-0.031 -0.035 -0.01)
      PathPoint P3: tibia_r (-0.01 -0.065 -0.015)
      PathWrap: wrap_object=Popli_at_condyles_r method=hybrid
    DeGrooteFregly2016Muscle psoas_r: max_isometric_force=1427 optimal_fiber_length=0.1169 tendon_slack_length=0.0995
        pennation_angle_at_optimal=0.2155251 activation_time_constant=0.049 deactivation_time_constant=0.139
      PathPoint P1: pelvis (-0.0606 0.062 0.039)
      PathPoint P2: pelvis (-0.0205 -0.0654 0.0656)
      PathPoint P3: femur_r (-0.0132 -0.0467 0.0046)
      PathPoint P4: femur_r (-0.0235 -0.0524 0.0088)
      PathWrap: wrap_object=PS_at_brim_r method=hybrid range=(2 3)
    DeGrooteFregly2016Muscle quadfem_r: max_isometric_force=381 optimal_fiber_length=0.054 tendon_slack_length=0.024
        pennation_angle_at_optimal=0 activation_time_constant=0.011 deactivation_time_constant=0.045
      PathPoint quad_fem_r-P1: pelvis (-0.1143 -0.1151 0.052)
      PathPoint quad_fem_r-P2: femur_r (-0.0381 -0.0359 0.0366)
    DeGrooteFregly2016Muscle recfem_r: max_isometric_force=2192 optimal_fiber_length=0.0759 tendon_slack_length=0.4504
        pennation_angle_at_optimal=0.217 activation_time_constant=0.016 deactivation_time_constant=0.057
        active_force_width_scale=1.5
      PathPoint P1: pelvis (-0.024 -0.0388 0.0933)
      PathPoint P2: patella_r (0.01 0.049 0.0007)
      PathPoint P3: patella_r (0.0121 0.0437 -0.001)
      PathPoint P4: patella_r (0.005 0.00247 3e-5)
      PathPoint P5: tibia_r (0.0326 -0.06312 -0.00047)
      PathWrap: wrap_object=KnExt_at_fem_r method=hybrid
    DeGrooteFregly2016Muscle sart_r: max_isometric_force=249 optimal_fiber_length=0.403 tendon_slack_length=0.124
        pennation_angle_at_optimal=0.0261 activation_time_constant=0.017 deactivation_time_constant=0.059
      PathPoint P1: pelvis (-0.0195 -0.0156 0.1056)
      PathPoint P2: femur_r (-0.003 -0.3568 -0.0421)
      PathPoint P3: tibia_r (-0.0251 -0.0401 -0.0365)
      PathPoint P4: tibia_r (-0.0159 -0.0599 -0.0264)
      PathPoint P5: tibia_r (0.0136 -0.081 -0.0026)
    DeGrooteFregly2016Muscle semimem_r: max_isometric_force=2201 optimal_fiber_length=0.086 tendon_slack_length=0.335
        pennation_angle_at_optimal=0.2546 activation_time_constant=0.035 deactivation_time_constant=0.106
        active_force_width_scale=1.5
      PathPoint P1: pelvis (-0.0987 -0.114 0.0614)
      PathPoint P2: tibia_r (-0.027 -0.041 -0.0196)
      PathWrap: wrap_object=SM_at_condyles_r method=hybrid
    DeGrooteFregly2016Muscle semiten_r: max_isometric_force=591 optimal_fiber_length=0.193 tendon_slack_length=0.2472
        pennation_angle_at_optimal=0.2413 activation_time_constant=0.019 deactivation_time_constant=0.065
        active_force_width_scale=1.5
      PathPoint P1: pelvis (-0.1038 -0.1253 0.0515)
      PathPoint P2: tibia_r (-0.0312 -0.0508 -0.0229)
      PathPoint P3: tibia_r (0.0019 -0.0773 -0.0117)
      PathWrap: wrap_object=ST_at_condyles_r method=hybrid
    DeGrooteFregly2016Muscle soleus_r: max_isometric_force=6194 optimal_fiber_length=0.044 tendon_slack_length=0.2814
        pennation_angle_at_optimal=0.3814289 activation_time_constant=0.074 deactivation_time_constant=0.202
      PathPoint P1: tibia_r (-0.0076 -0.0916 0.0098)
      PathPoint P2: calcn_r (0.0044 0.031 -0.0053)
    DeGrooteFregly2016Muscle tfl_r: max_isometric_force=411 optimal_fiber_length=0.095 tendon_slack_length=0.4495
        pennation_angle_at_optimal=0.0524 activation_time_constant=0.01 deactivation_time_constant=0.043
      PathPoint P1: pelvis (-0.0311 0.0214 0.1241)
      PathPoint P2: femur_r (0.0294 -0.0995 0.0597)
      PathPoint P3: femur_r (0.0107 -0.405 0.0324)
      PathPoint P4: tibia_r (0.0108 -0.041 0.0346)
    DeGrooteFregly2016Muscle tibant_r: max_isometric_force=1227 optimal_fiber_length=0.0683 tendon_slack_length=0.2405
        pennation_angle_at_optimal=0.1951828 activation_time_constant=0.023 deactivation_time_constant=0.074
      PathPoint P1: tibia_r (0.0154 -0.1312 0.0162)
      PathPoint P2: tibia_r (0.0251 -0.1906 0.0128)
      PathPoint P3: tibia_r (0.0233 -0.3659 -0.0132)
      PathPoint P4: calcn_r (0.1166 0.0178 -0.0305)
    DeGrooteFregly2016Muscle tibpost_r: max_isometric_force=1730 optimal_fiber_length=0.0378 tendon_slack_length=0.2808
        pennation_angle_at_optimal=0.2265 activation_time_constant=0.019 deactivation_time_constant=0.066
      PathPoint P1: tibia_r (-0.0041 -0.1304 0.0103)
      PathPoint P2: tibia_r (-0.0164 -0.3655 -0.0175)
      PathPoint P3: calcn_r (0.0417 0.0334 -0.0286)
      PathPoint P4: calcn_r (0.0772 0.0159 -0.0281)
    DeGrooteFregly2016Muscle tricox_r: max_isometric_force=565 optimal_fiber_length=0.057 tendon_slack_length=0.058
        pennation_angle_at_optimal=0 activation_time_constant=0.01 deactivation_time_constant=0.042
      PathPoint P1: pelvis (-0.111 -0.102 0.037)
      PathPoint P2: pelvis (-0.132 -0.085 0.063)
      PathPoint P3: femur_r (-0.0142 -0.0033 0.0443)
    DeGrooteFregly2016Muscle vasint_r: max_isometric_force=1697 optimal_fiber_length=0.117 tendon_slack_length=0.205
        pennation_angle_at_optimal=0.06309973 activation_time_constant=0.026 deactivation_time_constant=0.082
      PathPoint P1: femur_r (0.029 -0.1924 0.031)
      PathPoint P2: femur_r (0.0335 -0.2084 0.0285)
      PathPoint P3: patella_r (0.0058 0.048 -0.0006)
      PathPoint P4: patella_r (0.005 0.00247 -0.00039)
      PathPoint P5: tibia_r (0.03257 -0.0632 0.00043)
      PathWrap: wrap_object=KnExt_at_fem_r method=hybrid
    DeGrooteFregly2016Muscle vaslat_r: max_isometric_force=5149 optimal_fiber_length=0.117 tendon_slack_length=0.221
        pennation_angle_at_optimal=0.2529 activation_time_constant=0.047 deactivation_time_constant=0.135
      PathPoint P1: femur_r (0.0048 -0.1854 0.0349)
      PathPoint P2: femur_r (0.0269 -0.2591 0.0409)
      PathPoint P3: patella_r (0.0103 0.0423 0.0141)
      PathPoint P4: patella_r (0.005 0.00247 0.00733)
      PathPoint P5: tibia_r (0.03254 -0.06338 0.00511)
      PathWrap: wrap_object=KnExtVL_at_fem_r method=hybrid
    DeGrooteFregly2016Muscle vasmed_r: max_isometric_force=2748 optimal_fiber_length=0.11 tendon_slack_length=0.208
        pennation_angle_at_optimal=0.4222 activation_time_constant=0.035 deactivation_time_constant=0.105
      PathPoint P1: femur_r (0.014 -0.2099 0.0188)
      PathPoint P2: femur_r (0.0356 -0.2769 0.0009)
      PathPoint P3: patella_r (0.0063 0.0445 -0.017)
      PathPoint P4: patella_r (0.005 0.00247 -0.0085)
      PathPoint P5: tibia_r (0.0319 -0.06357 -0.00678)
      PathWrap: wrap_object=KnExt_at_fem_r method=hybrid
    DeGrooteFregly2016Muscle addbrev_l: max_isometric_force=626 optimal_fiber_length=0.1031 tendon_slack_length=0.0355
        pennation_angle_at_optimal=0.1148 activation_time_constant=0.016 deactivation_time_constant=0.057
      PathPoint P1: pelvis (-0.0191 -0.094 -0.0154)
      PathPoint P2: femur_l (-0.002 -0.118 -0.0249)
      PathWrap: wrap_object=AB_at_femshaft_l method=hybrid
    DeGrooteFregly2016Muscle addlong_l: max_isometric_force=917 optimal_fiber_length=0.1082 tendon_slack_length=0.1318
        pennation_angle_at_optimal=0.1378 activation_time_constant=0.018 deactivation_time_constant=0.062
      PathPoint P1: pelvis (-0.00758 -0.0889 -0.01888)
      PathPoint P2: femur_l (0.01126 -0.23937 -0.01583)
      PathWrap: wrap_object=AL_at_femshaft_l method=hybrid
    DeGrooteFregly2016Muscle addmagMid_l: max_isometric_force=2389 optimal_fiber_length=0.1377
        tendon_slack_length=0.0466 pennation_angle_at_optimal=0.2073 activation_time_constant=0.05
        deactivation_time_constant=0.142
      PathPoint P1: pelvis (-0.05266 -0.12075 -0.02854)
      PathPoint P2: femur_l (0.00242 -0.1624 -0.02922)
      PathWrap: wrap_object=AMmid_at_femshaft_l method=hybrid
    DeGrooteFregly2016Muscle bflh_l: max_isometric_force=1313 optimal_fiber_length=0.0976 tendon_slack_length=0.3325
        pennation_angle_at_optimal=0.1759182 activation_time_constant=0.027 deactivation_time_constant=0.084
        active_force_width_scale=1.5
      PathPoint P1: pelvis (-0.104 -0.1191 -0.0586)
      PathPoint P2: tibia_l (-0.03436 -0.03648 -0.03618)
      PathPoint P3: tibia_l (-0.02704 -0.05008 -0.03476)
    DeGrooteFregly2016Muscle bfsh_l: max_isometric_force=557 optimal_fiber_length=0.1103 tendon_slack_length=0.1058
        pennation_angle_at_optimal=0.2642 activation_time_constant=0.012 deactivation_time_constant=0.048
      PathPoint P1: femur_l (0.005 -0.2111 -0.0234)
      PathPoint P2: tibia_l (-0.02866 -0.03284 -0.03204)
      PathWrap: wrap_object=BF140_at_gastroc_l method=hybrid
    DeGrooteFregly2016Muscle edl_l: max_isometric_force=603 optimal_fiber_length=0.0693 tendon_slack_length=0.3689
        pennation_angle_at_optimal=0.2183 activation_time_constant=0.009 deactivation_time_constant=0.041
        active_force_width_scale=1.5
      PathPoint P1: tibia_l (-0.016 -0.1157 -0.0205)
      PathPoint P2: tibia_l (0.0164 -0.376 -0.0112)
      PathPoint P3: calcn_l (0.0919 0.036 -0.0008)
      PathPoint P4: calcn_l (0.1616 0.0055 -0.013)
      PathPoint P5: toes_l (0.0003 0.0047 -0.0153)
      PathPoint P6: toes_l (0.0443 -0.0004 -0.025)
    DeGrooteFregly2016Muscle ehl_l: max_isometric_force=286 optimal_fiber_length=0.0748 tendon_slack_length=0.3268
        pennation_angle_at_optimal=0.1972681 activation_time_constant=0.01 deactivation_time_constant=0.043
        active_force_width_scale=1.5
      PathPoint P1: tibia_l (-0.014 -0.155 -0.0189)
      PathPoint P2: tibia_l (0.0071 -0.2909 -0.0164)
      PathPoint P3: tibia_l (0.02 -0.3693 0.0028)
      PathPoint P4: calcn_l (0.097 0.0389 0.0211)
      PathPoint P5: calcn_l (0.1293 0.0309 0.0257)
      PathPoint P6: calcn_l (0.1734 0.0139 0.028)
      PathPoint P7: toes_l (0.0298 0.0041 0.0245)
      PathPoint P8: toes_l (0.0563 0.0034 0.0186)
    DeGrooteFregly2016Muscle fdb_l: max_isometric_force=938 optimal_fiber_length=0.0299 tendon_slack_length=0.1693
        pennation_angle_at_optimal=0 activation_time_constant=0.007 deactivation_time_constant=0.036
      PathPoint P1: calcn_l (0.0213 0.0054 0)
      PathPoint P2: calcn_l (0.1658 -0.0081 -0.0116)
      PathPoint P3: toes_l (-0.0019 -0.0078 -0.0147)
      PathPoint P4: toes_l (0.0285 -0.0071 -0.0215)
      PathPoint P5: toes_l (0.0441 -0.006 -0.0242)
    DeGrooteFregly2016Muscle fdl_l: max_isometric_force=423 optimal_fiber_length=0.0446 tendon_slack_length=0.3788
        pennation_angle_at_optimal=0.2248 activation_time_constant=0.007 deactivation_time_constant=0.035
        active_force_width_scale=1.5
      PathPoint P1: tibia_l (-0.0023 -0.1832 0.0018)
      PathPoint P2: tibia_l (-0.0176 -0.3645 0.0124)
      PathPoint P3: calcn_l (0.0436 0.0315 0.028)
      PathPoint P4: calcn_l (0.0708 0.0176 0.0263)
      PathPoint P5: calcn_l (0.1658 -0.0081 -0.0116)
      PathPoint P6: toes_l (-0.0019 -0.0078 -0.0147)
      PathPoint P7: toes_l (0.0285 -0.0071 -0.0215)
      PathPoint P8: toes_l (0.0441 -0.006 -0.0242)
    DeGrooteFregly2016Muscle fhl_l: max_isometric_force=908 optimal_fiber_length=0.0527 tendon_slack_length=0.3543
        pennation_angle_at_optimal=0.258 activation_time_constant=0.01 deactivation_time_constant=0.042
        active_force_width_scale=1.5
      PathPoint P1: tibia_l (-0.031 -0.2163 -0.02)
      PathPoint P2: tibia_l (-0.0242 -0.3671 0.0076)
      PathPoint P3: calcn_l (0.0374 0.0276 0.0241)
      PathPoint P4: calcn_l (0.1038 0.0068 0.0256)
      PathPoint P5: calcn_l (0.1726 -0.0053 0.0269)
      PathPoint P6: toes_l (0.0155 -0.0064 0.0265)
      PathPoint P7: toes_l (0.0562 -0.0102 0.0181)
    DeGrooteFregly2016Muscle gaslat_l: max_isometric_force=1575 optimal_fiber_length=0.069 tendon_slack_length=0.374
        pennation_angle_at_optimal=0.2102 activation_time_constant=0.016 deactivation_time_constant=0.058
        active_force_width_scale=1.5
      PathPoint P1: femur_l (0.002 -0.381 -0.02059)
      PathPoint P2: calcn_l (0.0044 0.031 0.0053)
      PathWrap gaslat1: wrap_object=GasLat_at_shank_l method=hybrid
      PathWrap gaslat2: wrap_object=GasLat_at_condyles_l method=hybrid
    DeGrooteFregly2016Muscle gasmed_l: max_isometric_force=3116 optimal_fiber_length=0.059 tendon_slack_length=0.387
        pennation_angle_at_optimal=0.1656816 activation_time_constant=0.023 deactivation_time_constant=0.074
        active_force_width_scale=1.5
      PathPoint P1: femur_l (0.006 -0.385 0.022)
      PathPoint P2: calcn_l (0.0044 0.031 0.0053)
      PathWrap gasmed1: wrap_object=GasMed_at_shank_l method=hybrid
      PathWrap gasmed2: wrap_object=GasMed_at_condyles_l method=hybrid
    DeGrooteFregly2016Muscle glmax2_l: max_isometric_force=3338 optimal_fiber_length=0.157 tendon_slack_length=0.109
        pennation_angle_at_optimal=0.3673821 activation_time_constant=0.103 deactivation_time_constant=0.274
      PathPoint P1: pelvis (-0.1317 0.0087 -0.0462)
      PathPoint P2: pelvis (-0.1344 -0.0609 -0.0813)
      PathPoint P3: femur_l (-0.045 -0.0584 -0.0252)
      PathPoint P4: femur_l (-0.0156 -0.1016 -0.0419)
      PathWrap: wrap_object=Gmax2_at_pelvis_l method=hybrid
    DeGrooteFregly2016Muscle glmed2_l: max_isometric_force=2729 optimal_fiber_length=0.073 tendon_slack_length=0.0652
        pennation_angle_at_optimal=0.3165559 activation_time_constant=0.055 deactivation_time_constant=0.156
      PathPoint P1: pelvis (-0.085 0.0316 -0.0675)
      PathPoint P2: femur_l (-0.0258 -0.0058 -0.0527)
    DeGrooteFregly2016Muscle glmin2_l: max_isometric_force=1216 optimal_fiber_length=0.056 tendon_slack_length=0.0261
        pennation_angle_at_optimal=0 activation_time_constant=0.014 deactivation_time_constant=0.054
      PathPoint P1: pelvis (-0.0616 -0.0142 -0.0971)
      PathPoint P2: femur_l (-0.0096 -0.0104 -0.056)
    DeGrooteFregly2016Muscle grac_l: max_isometric_force=281 optimal_fiber_length=0.2278 tendon_slack_length=0.172
        pennation_angle_at_optimal=0.172 activation_time_constant=0.016 deactivation_time_constant=0.057
      PathPoint P1: pelvis (-0.04736 -0.12932 -0.02456)
      PathPoint P2: tibia_l (-0.01842 -0.04755 0.02961)
      PathPoint P3: tibia_l (0.00178 -0.06962 0.01573)
      PathWrap: wrap_object=GR_at_condyles_l method=hybrid
    DeGrooteFregly2016Muscle iliacus_l: max_isometric_force=1021 optimal_fiber_length=0.1066 tendon_slack_length=0.0961
        pennation_angle_at_optimal=0.2799 activation_time_constant=0.021 deactivation_time_constant=0.07
      PathPoint P1: pelvis (-0.0605 0.0309 -0.0843)
      PathPoint P2: pelvis (-0.0135 -0.0557 -0.0756)
      PathPoint P3: femur_l (-0.0023 -0.0565 -0.0139)
      PathPoint P4: femur_l (-0.0122 -0.0637 -0.0196)
      PathWrap: wrap_object=IL_at_brim_l method=hybrid range=(2 3)
    DeGrooteFregly2016Muscle obtext_l: max_isometric_force=109 optimal_fiber_length=0.0492 tendon_slack_length=0.0402
        pennation_angle_at_optimal=0.1222 activation_time_constant=0.006 deactivation_time_constant=0.032
      PathPoint P1: pelvis (-0.085 -0.1151 -0.037)
      PathPoint P2: femur_l (-0.035 -0.032 -0.041)
    DeGrooteFregly2016Muscle pect_l: max_isometric_force=266 optimal_fiber_length=0.08 tendon_slack_length=0.033
        pennation_angle_at_optimal=0 activation_time_constant=0.008 deactivation_time_constant=0.037
      PathPoint P1: pelvis (-0.0431 -0.0768 -0.0451)
      PathPoint P2: femur_l (-0.0122 -0.0822 -0.0253)
    DeGrooteFregly2016Muscle perbrev_l: max_isometric_force=521 optimal_fiber_length=0.0454 tendon_slack_length=0.1475
        pennation_angle_at_optimal=0.2052 activation_time_constant=0.008 deactivation_time_constant=0.038
      PathPoint P1: tibia_l (-0.0243 -0.2532 -0.0251)
      PathPoint P2: tibia_l (-0.0339 -0.3893 -0.0249)
      PathPoint P3: tibia_l (-0.0285 -0.4004 -0.0255)
      PathPoint P4: calcn_l (0.0471 0.027 -0.0233)
      PathPoint P5: calcn_l (0.0677 0.0219 -0.0343)
    DeGrooteFregly2016Muscle perlong_l: max_isometric_force=1115 optimal_fiber_length=0.0508 tendon_slack_length=0.3322
        pennation_angle_at_optimal=0.248 activation_time_constant=0.016 deactivation_time_constant=0.058
      PathPoint P1: tibia_l (-0.02 -0.1373 -0.0282)
      PathPoint P2: tibia_l (-0.0317 -0.39 -0.0237)
      PathPoint P3: tibia_l (-0.0272 -0.4014 -0.024)
      PathPoint P4: calcn_l (0.0438 0.023 -0.0221)
      PathPoint P5: calcn_l (0.0681 0.0106 -0.0284)
      PathPoint P6: calcn_l (0.0852 0.0069 -0.0118)
      PathPoint P7: calcn_l (0.1203 0.0085 0.0184)
    DeGrooteFregly2016Muscle pertert_l: max_isometric_force=180 optimal_fiber_length=0.0709 tendon_slack_length=0.08
        pennation_angle_at_optimal=0.2269 activation_time_constant=0.007 deactivation_time_constant=0.034
      PathPoint per_tert_l-P1: tibia_l (0.001 -0.2804 -0.0231)
      PathPoint per_tert_l-P2: tibia_l (0.0229 -0.3919 -0.0259)
      PathPoint per_tert_l-P3: calcn_l (0.0857 0.0228 -0.0299)
    DeGrooteFregly2016Muscle piri_l: max_isometric_force=1030 optimal_fiber_length=0.026 tendon_slack_length=0.1149
        pennation_angle_at_optimal=0.1745 activation_time_constant=0.012 deactivation_time_constant=0.046
      PathPoint P1: pelvis (-0.10181 -0.00653 -0.01351)
      PathPoint P2: pelvis (-0.10202 -0.03066 -0.06092)
      PathPoint P3: femur_l (-0.0148 -0.0036 -0.0437)
    DeGrooteFregly2016Muscle popli_l: max_isometric_force=344 optimal_fiber_length=0.041 tendon_slack_length=0.07
        pennation_angle_at_optimal=0 activation_time_constant=0.009 deactivation_time_constant=0.04
      PathPoint P1: femur_l (-0.01 -0.39 -0.035)
      PathPoint P2: tibia_l (-0.031 -0.035 0.01)
      PathPoint P3: tibia_l (-0.01 -0.065 0.015)
      PathWrap: wrap_object=Popli_at_condyles_l method=hybrid
    DeGrooteFregly2016Muscle psoas_l: max_isometric_force=1427 optimal_fiber_length=0.1169 tendon_slack_length=0.0995
        pennation_angle_at_optimal=0.2155251 activation_time_constant=0.049 deactivation_time_constant=0.139
      PathPoint P1: pelvis (-0.0606 0.062 -0.039)
      PathPoint P2: pelvis (-0.0205 -0.0654 -0.0656)
      PathPoint P3: femur_l (-0.0132 -0.0467 -0.0046)
      PathPoint P4: femur_l (-0.0235 -0.0524 -0.0088)
      PathWrap: wrap_object=PS_at_brim_l method=hybrid range=(2 3)
    DeGrooteFregly2016Muscle quadfem_l: max_isometric_force=381 optimal_fiber_length=0.054 tendon_slack_length=0.024
        pennation_angle_at_optimal=0 activation_time_constant=0.011 deactivation_time_constant=0.045
      PathPoint quad_fem_l-P1: pelvis (-0.1143 -0.1151 -0.052)
      PathPoint quad_fem_l-P2: femur_l (-0.0381 -0.0359 -0.0366)
    DeGrooteFregly2016Muscle recfem_l: max_isometric_force=2192 optimal_fiber_length=0.0759 tendon_slack_length=0.4504
        pennation_angle_at_optimal=0.217 activation_time_constant=0.016 deactivation_time_constant=0.057
        active_force_width_scale=1.5
      PathPoint P1: pelvis (-0.024 -0.0388 -0.0933)
      PathPoint P2: patella_l (0.01 0.049 -0.0007)
      PathPoint P3: patella_l (0.0121 0.0437 0.001)
      PathPoint P4: patella_l (0.005 0.00247 -3e-5)
      PathPoint P5: tibia_l (0.0326 -0.06312 0.00047)
      PathWrap: wrap_object=KnExt_at_fem_l method=hybrid
    DeGrooteFregly2016Muscle sart_l: max_isometric_force=249 optimal_fiber_length=0.403 tendon_slack_length=0.124
        pennation_angle_at_optimal=0.0261 activation_time_constant=0.017 deactivation_time_constant=0.059
      PathPoint P1: pelvis (-0.0195 -0.0156 -0.1056)
      PathPoint P2: femur_l (-0.003 -0.3568 0.0421)
      PathPoint P3: tibia_l (-0.0251 -0.0401 0.0365)
      PathPoint P4: tibia_l (-0.0159 -0.0599 0.0264)
      PathPoint P5: tibia_l (0.0136 -0.081 0.0026)
    DeGrooteFregly2016Muscle semimem_l: max_isometric_force=2201 optimal_fiber_length=0.086 tendon_slack_length=0.335
        pennation_angle_at_optimal=0.2546 activation_time_constant=0.035 deactivation_time_constant=0.106
        active_force_width_scale=1.5
      PathPoint P1: pelvis (-0.0987 -0.114 -0.0614)
      PathPoint P2: tibia_l (-0.027 -0.041 0.0196)
      PathWrap: wrap_object=SM_at_condyles_l method=hybrid
    DeGrooteFregly2016Muscle semiten_l: max_isometric_force=591 optimal_fiber_length=0.193 tendon_slack_length=0.2472
        pennation_angle_at_optimal=0.2413 activation_time_constant=0.019 deactivation_time_constant=0.065
        active_force_width_scale=1.5
      PathPoint P1: pelvis (-0.1038 -0.1253 -0.0515)
      PathPoint P2: tibia_l (-0.0312 -0.0508 0.0229)
      PathPoint P3: tibia_l (0.0019 -0.0773 0.0117)
      PathWrap: wrap_object=ST_at_condyles_l method=hybrid
    DeGrooteFregly2016Muscle soleus_l: max_isometric_force=6194 optimal_fiber_length=0.044 tendon_slack_length=0.2814
        pennation_angle_at_optimal=0.3814289 activation_time_constant=0.074 deactivation_time_constant=0.202
      PathPoint P1: tibia_l (-0.0076 -0.0916 -0.0098)
      PathPoint P2: calcn_l (0.0044 0.031 0.0053)
    DeGrooteFregly2016Muscle tfl_l: max_isometric_force=411 optimal_fiber_length=0.095 tendon_slack_length=0.4495
        pennation_angle_at_optimal=0.0524 activation_time_constant=0.01 deactivation_time_constant=0.043
      PathPoint P1: pelvis (-0.0311 0.0214 -0.1241)
      PathPoint P2: femur_l (0.0294 -0.0995 -0.0597)
      PathPoint P3: femur_l (0.0107 -0.405 -0.0324)
      PathPoint P4: tibia_l (0.0108 -0.041 -0.0346)
    DeGrooteFregly2016Muscle tibant_l: max_isometric_force=1227 optimal_fiber_length=0.0683 tendon_slack_length=0.2405
        pennation_angle_at_optimal=0.1951828 activation_time_constant=0.023 deactivation_time_constant=0.074
      PathPoint P1: tibia_l (0.0154 -0.1312 -0.0162)
      PathPoint P2: tibia_l (0.0251 -0.1906 -0.0128)
      PathPoint P3: tibia_l (0.0233 -0.3659 0.0132)
      PathPoint P4: calcn_l (0.1166 0.0178 0.0305)
    DeGrooteFregly2016Muscle tibpost_l: max_isometric_force=1730 optimal_fiber_length=0.0378 tendon_slack_length=0.2808
        pennation_angle_at_optimal=0.2265 activation_time_constant=0.019 deactivation_time_constant=0.066
      PathPoint P1: tibia_l (-0.0041 -0.1304 -0.0103)
      PathPoint P2: tibia_l (-0.0164 -0.3655 0.0175)
      PathPoint P3: calcn_l (0.0417 0.0334 0.0286)
      PathPoint P4: calcn_l (0.0772 0.0159 0.0281)
    DeGrooteFregly2016Muscle tricox_l: max_isometric_force=565 optimal_fiber_length=0.057 tendon_slack_length=0.058
        pennation_angle_at_optimal=0 activation_time_constant=0.01 deactivation_time_constant=0.042
      PathPoint P1: pelvis (-0.111 -0.102 -0.037)
      PathPoint P2: pelvis (-0.132 -0.085 -0.063)
      PathPoint P3: femur_l (-0.0142 -0.0033 -0.0443)
    DeGrooteFregly2016Muscle vasint_l: max_isometric_force=1697 optimal_fiber_length=0.117 tendon_slack_length=0.205
        pennation_angle_at_optimal=0.06309973 activation_time_constant=0.026 deactivation_time_constant=0.082
      PathPoint P1: femur_l (0.029 -0.1924 -0.031)
      PathPoint P2: femur_l (0.0335 -0.2084 -0.0285)
      PathPoint P3: patella_l (0.0058 0.048 0.0006)
      PathPoint P4: patella_l (0.005 0.00247 0.00039)
      PathPoint P5: tibia_l (0.03257 -0.0632 -0.00043)
      PathWrap: wrap_object=KnExt_at_fem_l method=hybrid
    DeGrooteFregly2016Muscle vaslat_l: max_isometric_force=5149 optimal_fiber_length=0.117 tendon_slack_length=0.221
        pennation_angle_at_optimal=0.2529 activation_time_constant=0.047 deactivation_time_constant=0.135
      PathPoint P1: femur_l (0.0048 -0.1854 -0.0349)
      PathPoint P2: femur_l (0.0269 -0.2591 -0.0409)
      PathPoint P3: patella_l (0.0103 0.0423 -0.0141)
      PathPoint P4: patella_l (0.005 0.00247 -0.00733)
      PathPoint P5: tibia_l (0.03254 -0.06338 -0.00511)
      PathWrap: wrap_object=KnExtVL_at_fem_l method=hybrid
    DeGrooteFregly2016Muscle vasmed_l: max_isometric_force=2748 optimal_fiber_length=0.11 tendon_slack_length=0.208
        pennation_angle_at_optimal=0.4222 activation_time_constant=0.035 deactivation_time_constant=0.105
      PathPoint P1: femur_l (0.014 -0.2099 -0.0188)
      PathPoint P2: femur_l (0.0356 -0.2769 -0.0009)
      PathPoint P3: patella_l (0.0063 0.0445 0.017)
      PathPoint P4: patella_l (0.005 0.00247 0.0085)
      PathPoint P5: tibia_l (0.0319 -0.06357 0.00678)
      PathWrap: wrap_object=KnExt_at_fem_l method=hybrid
    ActivationCoordinateActuator lumbar_flex: coordinate=lumbar_flex optimal_force=65 activation_time_constant=0.01
    ActivationCoordinateActuator lumbar_add: coordinate=lumbar_add optimal_force=45 activation_time_constant=0.01
    ActivationCoordinateActuator lumbar_rot: coordinate=lumbar_rot optimal_force=55 activation_time_constant=0.01
  ContactGeometrySet:
    ContactSphere heel_r: socket_frame=/bodyset/calcn_r location=(0.001307528 -0.0081 0) radius=0.015
    ContactSphere latheel_r: socket_frame=/bodyset/calcn_r location=(0.02130753 -0.0081 0.025) radius=0.015
    ContactSphere medheel_r: socket_frame=/bodyset/calcn_r location=(0.02130753 -0.0081 -0.025) radius=0.015
    ContactSphere mid_r: socket_frame=/bodyset/calcn_r location=(0.08355376 -0.0081 0.0056) radius=0.015
    ContactSphere latmid_r: socket_frame=/bodyset/calcn_r location=(0.07215376 -0.0081 0.031) radius=0.015
    ContactSphere medmid_r: socket_frame=/bodyset/calcn_r location=(0.09165376 -0.0081 -0.023) radius=0.015
    ContactSphere mh1_r: socket_frame=/bodyset/calcn_r location=(0.182 -0.0081 -0.023) radius=0.015
    ContactSphere mh3_r: socket_frame=/bodyset/calcn_r location=(0.1658 -0.0081 0.0116) radius=0.015
    ContactSphere mh5_r: socket_frame=/bodyset/calcn_r location=(0.143 -0.0081 0.037) radius=0.015
    ContactSphere hallux_r: socket_frame=/bodyset/calcn_r location=(0.2362 -0.0102 -0.0181) radius=0.015
    ContactSphere othertoes_r: socket_frame=/bodyset/calcn_r location=(0.2141 -0.006 0.0242) radius=0.015
    ContactSphere heel_l: socket_frame=/bodyset/calcn_l location=(0.001307528 -0.0081 0) radius=0.015
    ContactSphere latheel_l: socket_frame=/bodyset/calcn_l location=(0.02130753 -0.0081 -0.025) radius=0.015
    ContactSphere medheel_l: socket_frame=/bodyset/calcn_l location=(0.02130753 -0.0081 0.025) radius=0.015
    ContactSphere mid_l: socket_frame=/bodyset/calcn_l location=(0.08355376 -0.0081 -0.0056) radius=0.015
    ContactSphere latmid_l: socket_frame=/bodyset/calcn_l location=(0.07215376 -0.0081 -0.031) radius=0.015
    ContactSphere medmid_l: socket_frame=/bodyset/calcn_l location=(0.09165376 -0.0081 0.023) radius=0.015
    ContactSphere mh1_l: socket_frame=/bodyset/calcn_l location=(0.182 -0.0081 0.023) radius=0.015
    ContactSphere mh3_l: socket_frame=/bodyset/calcn_l location=(0.1658 -0.0081 -0.0116) radius=0.015
    ContactSphere mh5_l: socket_frame=/bodyset/calcn_l location=(0.143 -0.0081 -0.037) radius=0.015
    ContactSphere hallux_l: socket_frame=/bodyset/calcn_l location=(0.2362 -0.0102 0.0181) radius=0.015
    ContactSphere othertoes_l: socket_frame=/bodyset/calcn_l location=(0.2141 -0.006 -0.0242) radius=0.015
    ContactHalfSpace floor: socket_frame=/ground orientation=(0 0 -1.570796)
  ComponentSet:
    ExternalLoads: datafile=1_00_grf_cop.sto
      ExternalForce Right_GRF: applied_to_body=talus_r force_expressed_in_body=ground point_expressed_in_body=ground
          force_identifier=ground_force_r_v point_identifier=ground_force_r_p torque_identifier=ground_torque_r_
          data_source_name=GRF_cop
      ExternalForce Left_GRF: applied_to_body=talus_l force_expressed_in_body=ground point_expressed_in_body=ground
          force_identifier=ground_force_l_v point_identifier=ground_force_l_p torque_identifier=ground_torque_l_
          data_source_name=GRF_cop
