# OpenSim document version 40000
Model compass_gait:
  gravity: 0 -9.80665 0
  SliderJoint slider: socket_parent_frame=/ground socket_child_frame=/bodyset/body1
    Coordinate position
  CoordinateActuator actuator: coordinate=position optimal_force=1
  Ground
  BodySet:
    Body body1: mass=10 [kg] inertia=(0 0 0 0 0 0)
      Sphere body1_geom_1: radius=0.05
  MarkerSet:
    Marker testMarker: body1 (0 0 0)
